// SBML level 2 version 3

function hillfunction(x, CDH1, lamda, nx)
  lamda + (1 - lamda)*(1/(1 + (x/CDH1)^nx));
end

model No_1_model_2()

  // Species:
  species CDH1 = 0.000001;
  species CLDN7 = 2.666264;
  species FOXC2 = 195.18539;
  species GRHL2 = 16.507877;
  species GSC = 144.789323;
  species KLF8 = 172.653814;
  species NP63 = 19.837214;
  species OVOL2 = 4.49821;
  species SNAI1 = 3223.952;
  species SNAI2 = 288.503015;
  species TCF3 = 106.080869;
  species TGF_beta = 55.785128; TGF_beta is "TGF-beta";
  species TWIST1 = 8.436998;
  species TWIST2 = 203.938689;
  species VIM = 514.328773;
  species ZEB1 = 135345.3;
  species ZEB2 = 24952.38;
  species miR_101 = 0.012717; miR_101 is "miR-101";
  species miR_141 = 1.092858; miR_141 is "miR-141";
  species miR_200a = 0.996204; miR_200a is "miR-200a";
  species miR_200b = 0.000617; miR_200b is "miR-200b";
  species miR_200c = 0.007985; miR_200c is "miR-200c";
  species miR_205 = 65.992419; miR_205 is "miR-205";
  species miR_30c = 83.264168; miR_30c is "miR-30c";
  species miR_34a = 0.132651; miR_34a is "miR-34a";
  species miR_9 = 126.486352; miR_9 is "miR-9";

  // Parameters:
  g0 = 588254.1;
  g1 = 75.092607;
  g2 = 58.498951;
  g3 = 46.803819;
  g4 = 71.887019;
  g5 = 79.410654;
  g6 = 36.29975;
  g7 = 24.990726;
  g8 = 2499.07257;
  g9 = 2447.768;
  g10 = 67.644475;
  g11 = 87.476442;
  g12 = 8.930662;
  g13 = 57.58838;
  g14 = 414.786762;
  g15 = 1.24915e7;
  g16 = 8929682;
  g17 = 50.169084;
  g18 = 72.80791;
  g19 = 79.087176;
  g20 = 7.68727;
  g21 = 12.662067;
  g22 = 66.912666;
  g23 = 17.865599;
  g24 = 71.615129;
  g25 = 14.069172;
  k0 = 0.415658;
  k1 = 0.342689;
  k2 = 0.208381;
  k3 = 0.152361;
  k4 = 0.496494;
  k5 = 0.459938;
  k6 = 0.393931;
  k7 = 0.662651;
  k8 = 0.413068;
  k9 = 0.80863;
  k10 = 0.637665;
  k11 = 0.33226;
  k12 = 0.81294;
  k13 = 0.279558;
  k14 = 0.52153;
  k15 = 0.772666;
  k16 = 0.298413;
  k17 = 0.833936;
  k18 = 0.929347;
  k19 = 0.213924;
  k20 = 0.659958;
  k21 = 0.171867;
  k22 = 0.947738;
  k23 = 0.214565;
  k24 = 0.214565;
  k25 = 0.111231;
  T52 = 34.351966;
  T55 = 162.90615;
  T58 = 0.265576;
  T61 = 0.021039;
  T64 = 11.308069;
  T67 = 2.213204;
  T70 = 6.343929;
  T73 = 0.990438;
  T76 = 0.723676;
  T79 = 3.657201;
  T82 = 37.837709;
  T85 = 0.453341;
  T88 = 0.166748;
  T91 = 6.307609;
  T94 = 46.064509;
  T97 = 0.178405;
  T100 = 9.775707;
  T103 = 2.828693;
  T106 = 4.774214;
  T109 = 3.245655;
  T112 = 2.833243;
  T115 = 0.386698;
  T118 = 12.519718;
  T121 = 4.039503;
  T124 = 5.962099;
  T127 = 130.366396;
  T130 = 4.334393;
  T133 = 0.875051;
  T136 = 5.117444;
  T139 = 4.183028;
  T142 = 6.368284;
  T145 = 1.861692;
  T148 = 17.40034;
  T151 = 9.051598;
  T154 = 0.606806;
  T157 = 1.259897;
  T160 = 5.40941;
  T163 = 17.044016;
  T166 = 1.974084;
  T169 = 4.78775;
  T172 = 1.431866;
  T175 = 15.610188;
  T178 = 0.415938;
  T181 = 54.556959;
  T184 = 3.686439;
  T187 = 0.624411;
  T190 = 9.43401;
  T193 = 2.304974;
  T196 = 0.536485;
  T199 = 14.217834;
  T202 = 32.660442;
  T205 = 12.72072;
  T208 = 0.762698;
  T211 = 0.981103;
  T214 = 0.342475;
  T217 = 4.41057;
  T220 = 0.205153;
  T223 = 0.899443;
  T226 = 0.938238;
  T229 = 1.280584;
  T232 = 12.912224;
  T235 = 1.550525;
  T238 = 2.49344;
  T241 = 0.702093;
  T244 = 3.047287;
  T247 = 49.84065;
  T250 = 3.89033;
  T253 = 1.163231;
  T256 = 7.563103;
  T259 = 2.613922;
  T262 = 1.594106;
  T265 = 9.951834;
  T268 = 1.379607;
  T271 = 16.804252;
  T274 = 11.327797;
  T277 = 59.72461;
  T280 = 12.961472;
  T283 = 3.097859;
  T286 = 1.994316;
  T289 = 31.03896;
  T292 = 154.717385;
  T295 = 52.583197;
  T298 = 0.818909;
  T301 = 7.245911;
  T304 = 6.930481;
  T307 = 0.545332;
  T310 = 43.27843;
  T313 = 0.257565;
  T316 = 0.437915;
  T319 = 1.704593;
  T322 = 1.0534;
  T325 = 1.151754;
  T328 = 0.687373;
  T331 = 0.325046;
  T334 = 0.133411;
  T337 = 1.143471;
  T340 = 0.618162;
  T343 = 5.271707;
  T346 = 0.434137;
  T349 = 1.913961;
  n53 = 1;
  n56 = 2;
  n59 = 5;
  n62 = 6;
  n65 = 1;
  n68 = 6;
  n71 = 4;
  n74 = 6;
  n77 = 1;
  n80 = 5;
  n83 = 3;
  n86 = 5;
  n89 = 2;
  n92 = 4;
  n95 = 2;
  n98 = 3;
  n101 = 2;
  n104 = 5;
  n107 = 2;
  n110 = 4;
  n113 = 2;
  n116 = 5;
  n119 = 5;
  n122 = 4;
  n125 = 6;
  n128 = 3;
  n131 = 3;
  n134 = 4;
  n137 = 2;
  n140 = 4;
  n143 = 5;
  n146 = 4;
  n149 = 2;
  n152 = 2;
  n155 = 4;
  n158 = 2;
  n161 = 6;
  n164 = 2;
  n167 = 1;
  n170 = 3;
  n173 = 1;
  n176 = 3;
  n179 = 4;
  n182 = 1;
  n185 = 4;
  n188 = 1;
  n191 = 2;
  n194 = 2;
  n197 = 6;
  n200 = 1;
  n203 = 1;
  n206 = 1;
  n209 = 3;
  n212 = 1;
  n215 = 4;
  n218 = 5;
  n221 = 4;
  n224 = 1;
  n227 = 5;
  n230 = 5;
  n233 = 1;
  n236 = 6;
  n239 = 3;
  n242 = 5;
  n245 = 3;
  n248 = 4;
  n251 = 4;
  n254 = 4;
  n257 = 5;
  n260 = 5;
  n263 = 5;
  n266 = 2;
  n269 = 4;
  n272 = 3;
  n275 = 5;
  n278 = 1;
  n281 = 4;
  n284 = 3;
  n287 = 2;
  n290 = 4;
  n293 = 6;
  n296 = 6;
  n299 = 3;
  n302 = 5;
  n305 = 6;
  n308 = 1;
  n311 = 4;
  n314 = 2;
  n317 = 5;
  n320 = 5;
  n323 = 6;
  n326 = 5;
  n329 = 4;
  n332 = 5;
  n335 = 4;
  n338 = 3;
  n341 = 3;
  n344 = 2;
  n347 = 6;
  n350 = 6;
  lambda54 = 0.010677;
  lambda57 = 0.088226;
  lambda60 = 0.076249;
  lambda63 = 0.023135;
  lambda66 = 0.212258;
  lambda69 = 0.012302;
  lambda72 = 0.023314;
  lambda75 = 0.085363;
  lambda78 = 0.015245;
  lambda81 = 46.062434;
  lambda84 = 28.045023;
  lambda87 = 0.012168;
  lambda90 = 48.907925;
  lambda93 = 86.275645;
  lambda96 = 83.577068;
  lambda99 = 0.066538;
  lambda102 = 64.412726;
  lambda105 = 36.795851;
  lambda108 = 0.02806;
  lambda111 = 0.010336;
  lambda114 = 27.501602;
  lambda117 = 0.369374;
  lambda120 = 32.871878;
  lambda123 = 0.011219;
  lambda126 = 0.010667;
  lambda129 = 0.033696;
  lambda132 = 0.025747;
  lambda135 = 0.904156;
  lambda138 = 49.500597;
  lambda141 = 62.935176;
  lambda144 = 3.644144;
  lambda147 = 17.066093;
  lambda150 = 0.235709;
  lambda153 = 0.015924;
  lambda156 = 54.641805;
  lambda159 = 59.915625;
  lambda162 = 1.393069;
  lambda165 = 77.867443;
  lambda168 = 32.511268;
  lambda171 = 0.026447;
  lambda174 = 0.017521;
  lambda177 = 84.162313;
  lambda180 = 37.043933;
  lambda183 = 0.013119;
  lambda186 = 0.029509;
  lambda189 = 0.011583;
  lambda192 = 0.027068;
  lambda195 = 0.011916;
  lambda198 = 97.621175;
  lambda201 = 27.194723;
  lambda204 = 52.605798;
  lambda207 = 0.031482;
  lambda210 = 28.482451;
  lambda213 = 3.046802;
  lambda216 = 75.551306;
  lambda219 = 99.034513;
  lambda222 = 75.383761;
  lambda225 = 31.504025;
  lambda228 = 0.671704;
  lambda231 = 46.722852;
  lambda234 = 0.048783;
  lambda237 = 0.147646;
  lambda240 = 0.244941;
  lambda243 = 0.017228;
  lambda246 = 0.011681;
  lambda249 = 0.092549;
  lambda252 = 0.053651;
  lambda255 = 66.328968;
  lambda258 = 87.546183;
  lambda261 = 78.930948;
  lambda264 = 87.718134;
  lambda267 = 10.138324;
  lambda270 = 0.084304;
  lambda273 = 0.021054;
  lambda276 = 0.018421;
  lambda279 = 0.018421;
  lambda282 = 0.017938;
  lambda285 = 0.011403;
  lambda288 = 0.010852;
  lambda291 = 0.011865;
  lambda294 = 0.262837;
  lambda297 = 0.016758;
  lambda300 = 38.691257;
  lambda303 = 43.595615;
  lambda306 = 92.148087;
  lambda309 = 85.923019;
  lambda312 = 62.61527;
  lambda315 = 0.013999;
  lambda318 = 0.0151;
  lambda321 = 0.01395;
  lambda324 = 0.200767;
  lambda327 = 0.013422;
  lambda330 = 0.012297;
  lambda333 = 0.065659;
  lambda336 = 0.065659;
  lambda339 = 0.010418;
  lambda342 = 0.010403;
  lambda345 = 98.824726;
  lambda348 = 0.032596;
  lambda351 = 0.012193;

  // Reactions:
  eq_1: -> CDH1; g0*hillfunction(KLF8, T55, lambda57, n56)*hillfunction(miR_9, T133, lambda135, n134)*hillfunction(SNAI1, T139, lambda141, n140)*hillfunction(SNAI2, T169, lambda171, n170)*hillfunction(TCF3, T187, lambda189, n188)*hillfunction(TWIST1, T190, lambda192, n191)*hillfunction(TWIST2, T214, lambda216, n215)*hillfunction(ZEB1, T232, lambda234, n233)*hillfunction(ZEB2, T256, lambda258, n257)*(hillfunction(OVOL2, T313, lambda315, n314)/lambda315)*(hillfunction(CLDN7, T334, lambda336, n335)/lambda336) - k0*CDH1;
  eq_2: -> CLDN7; g1*hillfunction(ZEB1, T331, lambda333, n332) - k1*CLDN7;
  eq_3: -> FOXC2; g2*(hillfunction(SNAI1, T145, lambda147, n146)/lambda147)*(hillfunction(TWIST1, T196, lambda198, n197)/lambda198)*(hillfunction(GSC, T280, lambda282, n281)/lambda282) - k2*FOXC2;
  eq_4: -> GRHL2; g3*hillfunction(ZEB1, T310, lambda312, n311)*(hillfunction(NP63, T346, lambda348, n347)/lambda348) - k3*GRHL2;
  eq_5: -> GSC; g4*(hillfunction(TGF_beta, T289, lambda291, n290)/lambda291) - k4*GSC;
  eq_6: -> KLF8; g5*hillfunction(miR_101, T58, lambda60, n59) - k5*KLF8;
  eq_7: -> NP63; g6*hillfunction(OVOL2, T325, lambda327, n326)*(hillfunction(GRHL2, T349, lambda351, n350)/lambda351) - k6*NP63;
  eq_8: -> OVOL2; g7*hillfunction(ZEB1, T298, lambda300, n299)*(hillfunction(GRHL2, T304, lambda306, n305)/lambda306)*hillfunction(OVOL2, T316, lambda318, n317) - k7*OVOL2;
  eq_9: -> SNAI1; g8*hillfunction(miR_101, T67, lambda69, n68)*hillfunction(miR_30c, T112, lambda114, n113)*hillfunction(miR_34a, T121, lambda123, n122)*hillfunction(SNAI1, T148, lambda150, n149)*(hillfunction(TWIST1, T199, lambda201, n200)/lambda201)*(hillfunction(TWIST2, T217, lambda219, n218)/lambda219)*(hillfunction(GSC, T274, lambda276, n275)/lambda276)*(hillfunction(TGF_beta, T292, lambda294, n293)/lambda294) - k8*SNAI1;
  eq_10: -> SNAI2; g9*hillfunction(miR_30c, T115, lambda117, n116)*hillfunction(miR_34a, T124, lambda126, n125)*(hillfunction(SNAI1, T151, lambda153, n152)/lambda153)*(hillfunction(SNAI2, T175, lambda177, n176)/lambda177)*(hillfunction(TWIST1, T202, lambda204, n203)/lambda204)*(hillfunction(TWIST2, T220, lambda222, n221)/lambda222)*(hillfunction(TGF_beta, T295, lambda297, n296)/lambda297)*hillfunction(OVOL2, T322, lambda324, n323)*hillfunction(CDH1, T337, lambda339, n338)*(hillfunction(NP63, T340, lambda342, n341)/lambda342) - k9*SNAI2;
  eq_11: -> TCF3; g10*(hillfunction(TWIST1, T205, lambda207, n206)/lambda207) - k10*TCF3;
  eq_12: -> TGF_beta; g11*hillfunction(miR_141, T76, lambda78, n77)*hillfunction(miR_200a, T85, lambda87, n86)*hillfunction(miR_200b, T94, lambda96, n95)*hillfunction(miR_200c, T103, lambda105, n104)*hillfunction(OVOL2, T328, lambda330, n329) - k11*TGF_beta;
  eq_13: -> TWIST1; g12*(hillfunction(SNAI1, T154, lambda156, n155)/lambda156)*(hillfunction(TWIST2, T223, lambda225, n224)/lambda225)*(hillfunction(GSC, T277, lambda279, n278)/lambda279) - k12*TWIST1;
  eq_14: -> TWIST2; g13*hillfunction(miR_34a, T127, lambda129, n128)*(hillfunction(SNAI2, T178, lambda180, n179)/lambda180) - k13*TWIST2;
  eq_15: -> VIM; g14*(hillfunction(SNAI1, T142, lambda144, n143)/lambda144)*(hillfunction(SNAI2, T172, lambda174, n173)/lambda174)*(hillfunction(TWIST1, T193, lambda195, n194)/lambda195)*(hillfunction(ZEB1, T235, lambda237, n236)/lambda237)*(hillfunction(ZEB2, T259, lambda261, n260)/lambda261)*hillfunction(OVOL2, T319, lambda321, n320) - k14*VIM;
  eq_16: -> ZEB1; g15*(hillfunction(FOXC2, T52, lambda54, n53)/lambda54)*hillfunction(miR_101, T61, lambda63, n62)*hillfunction(miR_141, T70, lambda72, n71)*hillfunction(miR_200a, T79, lambda81, n80)*hillfunction(miR_200b, T88, lambda90, n89)*hillfunction(miR_200c, T97, lambda99, n98)*hillfunction(miR_205, T106, lambda108, n107)*hillfunction(miR_34a, T130, lambda132, n131)*(hillfunction(SNAI1, T157, lambda159, n158)/lambda159)*(hillfunction(TWIST1, T208, lambda210, n209)/lambda210)*(hillfunction(TWIST2, T226, lambda228, n227)/lambda228)*(hillfunction(ZEB1, T253, lambda255, n254)/lambda255)*(hillfunction(GSC, T283, lambda285, n284)/lambda285)*hillfunction(OVOL2, T301, lambda303, n302)*hillfunction(GRHL2, T307, lambda309, n308) - k15*ZEB1;
  eq_17: -> ZEB2; g16*hillfunction(miR_101, T64, lambda66, n65)*hillfunction(miR_141, T73, lambda75, n74)*hillfunction(miR_200a, T82, lambda84, n83)*hillfunction(miR_200b, T91, lambda93, n92)*hillfunction(miR_200c, T100, lambda102, n101)*hillfunction(miR_205, T109, lambda111, n110)*hillfunction(miR_30c, T118, lambda120, n119)*hillfunction(miR_9, T136, lambda138, n137)*(hillfunction(SNAI1, T160, lambda162, n161)/lambda162)*(hillfunction(TWIST1, T211, lambda213, n212)/lambda213)*(hillfunction(TWIST2, T229, lambda231, n230)/lambda231)*(hillfunction(ZEB2, T271, lambda273, n272)/lambda273)*(hillfunction(GSC, T286, lambda288, n287)/lambda288) - k16*ZEB2;
  eq_18: -> miR_101; g17*hillfunction(SNAI1, T166, lambda168, n167)*hillfunction(SNAI2, T181, lambda183, n182) - k17*miR_101;
  eq_19: -> miR_141; g18*hillfunction(ZEB1, T238, lambda240, n239) - k18*miR_141;
  eq_20: -> miR_200a; g19*hillfunction(ZEB1, T247, lambda249, n248)*hillfunction(ZEB2, T268, lambda270, n269) - k19*miR_200a;
  eq_21: -> miR_200b; g20*hillfunction(SNAI2, T184, lambda186, n185)*hillfunction(ZEB1, T241, lambda243, n242)*hillfunction(ZEB2, T262, lambda264, n263) - k20*miR_200b;
  eq_22: -> miR_200c; g21*hillfunction(ZEB1, T244, lambda246, n245)*hillfunction(ZEB2, T265, lambda267, n266) - k21*miR_200c;
  eq_23: -> miR_205; g22*(hillfunction(NP63, T343, lambda345, n344)/lambda345) - k22*miR_205;
  eq_24: -> miR_30c; g23 - k23*miR_30c;
  eq_25: -> miR_34a; g24*hillfunction(SNAI1, T163, lambda165, n164)*hillfunction(ZEB1, T250, lambda252, n251) - k24*miR_34a;
  eq_26: -> miR_9; g25 - k25*miR_9;
end
