// SBML level 2 version 3

function hillfunction(x, FOXC2, lamda, nx)
  lamda + (1 - lamda)*(1/(1 + (x/FOXC2)^nx));
end

model No_1_model_1()

  // Species:
  species FOXC2 = 60.824842;
  species ZEB1 = 5128433;
  species KLF8 = 250.405454;
  species CDH1 = 0.000005;
  species miR_101 = 0.048181; miR_101 is "miR-101";
  species ZEB2 = 2228475;
  species SNAI1 = 74.126827;
  species miR_141 = 0.522094; miR_141 is "miR-141";
  species TGF_beta = 95.24419; TGF_beta is "TGF-beta";
  species miR_200a = 0.114124; miR_200a is "miR-200a";
  species miR_200b = 0.000575; miR_200b is "miR-200b";
  species miR_200c = 0.046458; miR_200c is "miR-200c";
  species miR_205 = 140.200923; miR_205 is "miR-205";
  species miR_30c = 20.644242; miR_30c is "miR-30c";
  species SNAI2 = 615.69733;
  species miR_34a = 0.002907; miR_34a is "miR-34a";
  species TWIST2 = 19.42045;
  species miR_9 = 9.706086; miR_9 is "miR-9";
  species VIM = 262.676661;
  species TWIST1 = 50.920172;
  species TCF3 = 41.253145;
  species GSC = 170.618575;

  // Parameters:
  g0 = 54.105013;
  g1 = 8972877;
  g2 = 45.243985;
  g3 = 97407.48;
  g4 = 97.712516;
  g5 = 4053664;
  g6 = 6873.782;
  g7 = 33.448034;
  g8 = 43.708504;
  g9 = 52.038089;
  g10 = 43.708504;
  g11 = 52.038089;
  g12 = 61.040527;
  g13 = 19.341971;
  g14 = 370.856985;
  g15 = 18.031479;
  g16 = 2.518746;
  g17 = 9.418814;
  g18 = 260.671168;
  g19 = 74.541547;
  g20 = 14.909873;
  g21 = 89.836021;
  k0 = 0.81721;
  k1 = 0.658701;
  k2 = 0.180683;
  k3 = 0.278763;
  k4 = 0.891226;
  k5 = 0.328758;
  k6 = 0.824876;
  k7 = 0.677349;
  k8 = 0.451756;
  k9 = 0.971528;
  k10 = 0.758246;
  k11 = 0.428076;
  k12 = 0.435379;
  k13 = 0.936918;
  k14 = 0.594766;
  k15 = 0.792188;
  k16 = 0.129696;
  k17 = 0.970403;
  k18 = 0.984877;
  k19 = 0.914306;
  k20 = 0.360403;
  k21 = 0.526479;
  T44 = 0.185469;
  T47 = 0.596854;
  T50 = 48.420463;
  T53 = 2.518887;
  T56 = 13.836775;
  T59 = 14.82383;
  T62 = 4.091281;
  T65 = 2.250255;
  T68 = 11.438887;
  T71 = 109.317054;
  T74 = 2.833573;
  T77 = 0.830052;
  T80 = 6.453246;
  T83 = 8.728233;
  T86 = 2.449005;
  T89 = 48.335256;
  T92 = 3.057904;
  T95 = 39.801359;
  T98 = 90.583843;
  T101 = 1.130594;
  T104 = 0.292098;
  T107 = 32.466677;
  T110 = 5.149424;
  T113 = 11.347363;
  T116 = 0.474386;
  T119 = 0.508695;
  T122 = 1.206754;
  T125 = 1.77938;
  T128 = 2.791792;
  T131 = 0.818203;
  T134 = 11.568746;
  T137 = 2.612948;
  T140 = 0.597612;
  T143 = 149.3845;
  T146 = 46.555753;
  T149 = 38.321797;
  T152 = 0.905937;
  T155 = 7.078215;
  T158 = 16.969883;
  T161 = 2.100539;
  T164 = 21.762702;
  T167 = 4.270306;
  T170 = 11.447934;
  T173 = 0.234524;
  T176 = 0.637959;
  T179 = 2.038;
  T182 = 11.666897;
  T185 = 74.736879;
  T188 = 0.486632;
  T191 = 2.24692;
  T194 = 32.779119;
  T197 = 8.831479;
  T200 = 1.644357;
  T203 = 8.522499;
  T206 = 2.354197;
  T209 = 0.646681;
  T212 = 5.293203;
  T215 = 2.512114;
  T218 = 1.495405;
  T221 = 2.216904;
  T224 = 0.963383;
  T227 = 177.960299;
  T230 = 13.638407;
  T233 = 0.538148;
  T236 = 5.059135;
  T239 = 7.679588;
  T242 = 7.720289;
  T245 = 0.767467;
  T248 = 0.819602;
  T251 = 0.479537;
  T254 = 13.226415;
  T257 = 4.477677;
  T260 = 0.840018;
  T263 = 2.876396;
  T266 = 2.940779;
  T269 = 0.680549;
  T272 = 1.656489;
  T275 = 0.528595;
  T278 = 16.779211;
  T281 = 28.180147;
  T284 = 2.728598;
  T287 = 0.955542;
  n45 = 2;
  n48 = 1;
  n51 = 2;
  n54 = 2;
  n57 = 6;
  n60 = 6;
  n63 = 3;
  n66 = 1;
  n69 = 1;
  n72 = 2;
  n75 = 2;
  n78 = 2;
  n81 = 4;
  n84 = 5;
  n87 = 6;
  n90 = 2;
  n93 = 5;
  n96 = 2;
  n99 = 6;
  n102 = 4;
  n105 = 2;
  n108 = 2;
  n111 = 1;
  n114 = 5;
  n117 = 1;
  n120 = 2;
  n123 = 1;
  n126 = 2;
  n129 = 5;
  n132 = 1;
  n135 = 4;
  n138 = 6;
  n141 = 1;
  n144 = 3;
  n147 = 3;
  n150 = 3;
  n153 = 3;
  n156 = 6;
  n159 = 3;
  n162 = 4;
  n165 = 4;
  n168 = 6;
  n171 = 2;
  n174 = 1;
  n177 = 5;
  n180 = 6;
  n183 = 4;
  n186 = 2;
  n189 = 5;
  n192 = 1;
  n195 = 1;
  n198 = 2;
  n201 = 4;
  n204 = 2;
  n207 = 4;
  n210 = 2;
  n213 = 4;
  n216 = 2;
  n219 = 3;
  n222 = 6;
  n225 = 1;
  n228 = 4;
  n231 = 3;
  n234 = 5;
  n237 = 1;
  n240 = 4;
  n243 = 6;
  n246 = 2;
  n249 = 5;
  n252 = 6;
  n255 = 5;
  n258 = 5;
  n261 = 5;
  n264 = 1;
  n267 = 2;
  n270 = 4;
  n273 = 2;
  n276 = 1;
  n279 = 4;
  n282 = 2;
  n285 = 2;
  n288 = 2;
  lambda46 = 51.590062;
  lambda49 = 3.537859;
  lambda52 = 78.631846;
  lambda55 = 43.4841;
  lambda58 = 0.028865;
  lambda61 = 0.046874;
  lambda64 = 0.013611;
  lambda67 = 0.035883;
  lambda70 = 0.036209;
  lambda73 = 0.060451;
  lambda76 = 0.012026;
  lambda79 = 33.875757;
  lambda82 = 50.845572;
  lambda85 = 69.307422;
  lambda88 = 38.737843;
  lambda91 = 35.543402;
  lambda94 = 0.011843;
  lambda97 = 0.021682;
  lambda100 = 0.019248;
  lambda103 = 0.012088;
  lambda106 = 0.013312;
  lambda109 = 0.015067;
  lambda112 = 0.020371;
  lambda115 = 0.037423;
  lambda118 = 0.033411;
  lambda121 = 0.014266;
  lambda124 = 0.010262;
  lambda127 = 0.016818;
  lambda130 = 0.011138;
  lambda133 = 0.05697;
  lambda136 = 0.011663;
  lambda139 = 0.018695;
  lambda142 = 0.023719;
  lambda145 = 0.019558;
  lambda148 = 0.019845;
  lambda151 = 0.38247;
  lambda154 = 1.348956;
  lambda157 = 45.585423;
  lambda160 = 68.444715;
  lambda163 = 4.736576;
  lambda166 = 3.089189;
  lambda169 = 0.010806;
  lambda172 = 0.044159;
  lambda175 = 0.057209;
  lambda178 = 0.04487;
  lambda181 = 82.068791;
  lambda184 = 51.106934;
  lambda187 = 96.150138;
  lambda190 = 77.339492;
  lambda193 = 0.010572;
  lambda196 = 0.017737;
  lambda199 = 0.018175;
  lambda202 = 0.011884;
  lambda205 = 0.046318;
  lambda208 = 0.018382;
  lambda211 = 0.115907;
  lambda214 = 0.02255;
  lambda217 = 0.02412;
  lambda220 = 0.018341;
  lambda223 = 0.012254;
  lambda226 = 0.031187;
  lambda229 = 0.022521;
  lambda232 = 0.023129;
  lambda235 = 54.704082;
  lambda238 = 60.128893;
  lambda241 = 17.19185;
  lambda244 = 59.371403;
  lambda247 = 76.199184;
  lambda250 = 0.01004;
  lambda253 = 0.012719;
  lambda256 = 0.053593;
  lambda259 = 66.466413;
  lambda262 = 73.042202;
  lambda265 = 51.066083;
  lambda268 = 10.25592;
  lambda271 = 7.759485;
  lambda274 = 69.041588;
  lambda277 = 76.794921;
  lambda280 = 95.397513;
  lambda283 = 81.230869;
  lambda286 = 72.103775;
  lambda289 = 92.453752;

  // Reactions:
  eq_1: -> FOXC2; g0*(hillfunction(SNAI1, T137, lambda139, n138)/lambda139)*(hillfunction(TWIST1, T188, lambda190, n189)/lambda190)*(hillfunction(GSC, T272, lambda274, n273)/lambda274) - k0*FOXC2;
  eq_2: -> ZEB1; g1*(hillfunction(FOXC2, T44, lambda46, n45)/lambda46)*hillfunction(miR_101, T53, lambda55, n54)*hillfunction(miR_141, T62, lambda64, n63)*hillfunction(miR_200a, T71, lambda73, n72)*hillfunction(miR_200b, T80, lambda82, n81)*hillfunction(miR_200c, T89, lambda91, n90)*hillfunction(miR_205, T98, lambda100, n99)*hillfunction(miR_34a, T122, lambda124, n123)*(hillfunction(SNAI1, T149, lambda151, n150)/lambda151)*(hillfunction(TWIST1, T200, lambda202, n201)/lambda202)*(hillfunction(TWIST2, T218, lambda220, n219)/lambda220)*(hillfunction(ZEB1, T245, lambda247, n246)/lambda247)*(hillfunction(GSC, T275, lambda277, n276)/lambda277) - k1*ZEB1;
  eq_3: -> KLF8; g2*hillfunction(miR_101, T50, lambda52, n51) - k2*KLF8;
  eq_4: -> CDH1; g3*hillfunction(KLF8, T47, lambda49, n48)*hillfunction(miR_9, T125, lambda127, n126)*hillfunction(SNAI1, T131, lambda133, n132)*hillfunction(SNAI2, T161, lambda163, n162)*hillfunction(TCF3, T179, lambda181, n180)*hillfunction(TWIST1, T182, lambda184, n183)*hillfunction(TWIST2, T206, lambda208, n207)*hillfunction(ZEB1, T224, lambda226, n225)*hillfunction(ZEB2, T248, lambda250, n249) - k3*CDH1;
  eq_5: -> miR_101; g4*hillfunction(SNAI1, T158, lambda160, n159)*hillfunction(SNAI2, T173, lambda175, n174) - k4*miR_101;
  eq_6: -> ZEB2; g5*hillfunction(miR_101, T56, lambda58, n57)*hillfunction(miR_141, T65, lambda67, n66)*hillfunction(miR_200a, T74, lambda76, n75)*hillfunction(miR_200b, T83, lambda85, n84)*hillfunction(miR_200c, T92, lambda94, n93)*hillfunction(miR_205, T101, lambda103, n102)*hillfunction(miR_30c, T110, lambda112, n111)*hillfunction(miR_9, T128, lambda130, n129)*(hillfunction(SNAI1, T152, lambda154, n153)/lambda154)*(hillfunction(TWIST1, T203, lambda205, n204)/lambda205)*(hillfunction(TWIST2, T221, lambda223, n222)/lambda223)*(hillfunction(ZEB2, T263, lambda265, n264)/lambda265)*(hillfunction(GSC, T278, lambda280, n279)/lambda280) - k5*ZEB2;
  eq_7: -> SNAI1; g6*hillfunction(miR_101, T59, lambda61, n60)*hillfunction(miR_30c, T104, lambda106, n105)*hillfunction(miR_34a, T113, lambda115, n114)*hillfunction(SNAI1, T140, lambda142, n141)*(hillfunction(TWIST1, T191, lambda193, n192)/lambda193)*(hillfunction(TWIST2, T209, lambda211, n210)/lambda211)*(hillfunction(GSC, T266, lambda268, n267)/lambda268)*(hillfunction(TGF_beta, T284, lambda286, n285)/lambda286) - k6*SNAI1;
  eq_8: -> miR_141; g7*hillfunction(ZEB1, T230, lambda232, n231) - k7*miR_141;
  eq_9: -> TGF_beta; g8*hillfunction(miR_141, T68, lambda70, n69)*hillfunction(miR_200a, T77, lambda79, n78)*hillfunction(miR_200b, T86, lambda88, n87)*hillfunction(miR_200c, T95, lambda97, n96) - k8*TGF_beta;
  eq_10: -> miR_200a; g9*hillfunction(ZEB1, T239, lambda241, n240)*hillfunction(ZEB2, T260, lambda262, n261) - k9*miR_200a;
  eq_11: -> miR_200b; g10*hillfunction(SNAI2, T176, lambda178, n177)*hillfunction(ZEB1, T233, lambda235, n234)*hillfunction(ZEB2, T254, lambda256, n255) - k10*miR_200b;
  eq_12: -> miR_200c; g11*hillfunction(ZEB1, T236, lambda238, n237)*hillfunction(ZEB2, T257, lambda259, n258) - k11*miR_200c;
  eq_13: -> miR_205; g12 - k12*miR_205;
  eq_14: -> miR_30c; g13 - k13*miR_30c;
  eq_15: -> SNAI2; g14*hillfunction(miR_30c, T107, lambda109, n108)*hillfunction(miR_34a, T116, lambda118, n117)*(hillfunction(SNAI1, T143, lambda145, n144)/lambda145)*(hillfunction(SNAI2, T167, lambda169, n168)/lambda169)*(hillfunction(TWIST1, T194, lambda196, n195)/lambda196)*(hillfunction(TWIST2, T212, lambda214, n213)/lambda214)*(hillfunction(TGF_beta, T287, lambda289, n288)/lambda289) - k14*SNAI2;
  eq_16: -> miR_34a; g15*hillfunction(SNAI1, T155, lambda157, n156)*hillfunction(ZEB1, T242, lambda244, n243) - k15*miR_34a;
  eq_17: -> TWIST2; g16*hillfunction(miR_34a, T119, lambda121, n120)*(hillfunction(SNAI2, T170, lambda172, n171)/lambda172) - k16*TWIST2;
  eq_18: -> miR_9; g17 - k17*miR_9;
  eq_19: -> VIM; g18*(hillfunction(SNAI1, T134, lambda136, n135)/lambda136)*(hillfunction(SNAI2, T164, lambda166, n165)/lambda166)*(hillfunction(TWIST1, T185, lambda187, n186)/lambda187)*(hillfunction(ZEB1, T227, lambda229, n228)/lambda229)*(hillfunction(ZEB2, T251, lambda253, n252)/lambda253) - k18*VIM;
  eq_20: -> TWIST1; g19*(hillfunction(SNAI1, T146, lambda148, n147)/lambda148)*(hillfunction(TWIST2, T215, lambda217, n216)/lambda217)*(hillfunction(GSC, T269, lambda271, n270)/lambda271) - k19*TWIST1;
  eq_21: -> TCF3; g20*(hillfunction(TWIST1, T197, lambda199, n198)/lambda199) - k20*TCF3;
  eq_22: -> GSC; g21*(hillfunction(TGF_beta, T281, lambda283, n282)/lambda283) - k21*GSC;
end
