// SBML level 2 version 3

function hillfunction(x, SNAIL, lamda, nx)
  lamda + (1 - lamda)*(1/(1 + (x/SNAIL)^nx));
end

model No_1_model_2()

  // Species:
  species SNAIL = 96.684777;
  species ZEB = 0.008601;
  species miR200 = 15.512856;
  species GRHL2 = 144.442324;

  // Parameters:
  g0 = 40.740395;
  g1 = 87.460302;
  g2 = 45.448664;
  g3 = 48.353139;
  k0 = 0.421373;
  k1 = 0.871236;
  k2 = 0.583239;
  k3 = 0.334756;
  T8 = 8.473241;
  T11 = 0.467239;
  T14 = 19.021623;
  T17 = 17.514553;
  T20 = 1.044907;
  T23 = 59.010862;
  T26 = 1.161412;
  T29 = 6.16607;
  n9 = 3;
  n12 = 1;
  n15 = 1;
  n18 = 3;
  n21 = 1;
  n24 = 3;
  n27 = 3;
  n30 = 4;
  lambda10 = 0.01489;
  lambda13 = 31.180794;
  lambda16 = 76.719144;
  lambda19 = 0.011734;
  lambda22 = 0.010609;
  lambda25 = 0.018964;
  lambda28 = 0.045717;
  lambda31 = 47.552157;

  // Reactions:
  eq_1: -> SNAIL; g0 - k0*SNAIL;
  eq_2: -> ZEB; g1*hillfunction(miR200, T8, lambda10, n9)*(hillfunction(ZEB, T14, lambda16, n15)/lambda16)*(hillfunction(SNAIL, T20, lambda22, n21)/lambda22)*hillfunction(GRHL2, T26, lambda28, n27) - k1*ZEB;
  eq_3: -> miR200; g2*hillfunction(ZEB, T11, lambda13, n12)*hillfunction(SNAIL, T17, lambda19, n18) - k2*miR200;
  eq_4: -> GRHL2; g3*hillfunction(ZEB, T23, lambda25, n24)*(hillfunction(GRHL2, T29, lambda31, n30)/lambda31) - k3*GRHL2;
end
