// SBML level 2 version 3

function hillfunction(x, SNAIL, lamda, nx)
  lamda + (1 - lamda)*(1/(1 + (x/SNAIL)^nx));
end

model No_6_model_1()

  // Species:
  species SNAIL = 89.724474;
  species ZEB = 2.863683;
  species miR200 = 2.407102;
  species GRHL2 = 0.000996;

  // Parameters:
  g0 = 82.118433;
  g1 = 48.141517;
  g2 = 30.457341;
  g3 = 1.265885;
  k0 = 0.915229;
  k1 = 0.537725;
  k2 = 0.496808;
  k3 = 0.563124;
  T8 = 2.871592;
  T11 = 0.110198;
  T14 = 151.459342;
  T17 = 8.729619;
  T20 = 0.581262;
  T23 = 110.825553;
  T26 = 0.823271;
  T29 = 16.946353;
  n9 = 1;
  n12 = 3;
  n15 = 6;
  n18 = 2;
  n21 = 2;
  n24 = 6;
  n27 = 5;
  n30 = 3;
  lambda10 = 0.056849;
  lambda13 = 32.208376;
  lambda16 = 65.219166;
  lambda19 = 0.032653;
  lambda22 = 0.01073;
  lambda25 = 0.031689;
  lambda28 = 0.011608;
  lambda31 = 30.555685;

  // Reactions:
  eq_1: -> SNAIL; g0 - k0*SNAIL;
  eq_2: -> ZEB; g1*hillfunction(miR200, T8, lambda10, n9)*(hillfunction(ZEB, T14, lambda16, n15)/lambda16)*(hillfunction(SNAIL, T20, lambda22, n21)/lambda22)*hillfunction(GRHL2, T26, lambda28, n27) - k1*ZEB;
  eq_3: -> miR200; g2*hillfunction(ZEB, T11, lambda13, n12)*hillfunction(SNAIL, T17, lambda19, n18) - k2*miR200;
  eq_4: -> GRHL2; g3*hillfunction(ZEB, T23, lambda25, n24)*(hillfunction(GRHL2, T29, lambda31, n30)/lambda31) - k3*GRHL2;
end
