// SBML level 2 version 3

function hillfunction(x, OVOL, lamda, nx)
  lamda + (1 - lamda)*(1/(1 + (x/OVOL)^nx));
end

model No_3_model_1()

  // Species:
  species OVOL = 0.609472;
  species SMAD = 65.980369;
  species SNAIL = 3.297207;
  species STAT3 = 14.177584;
  species TGFB = 35.103726;
  species Wg = 21.01656;
  species ZEB = 82.335733;
  species miR200 = 0.122951;
  species miR34 = 0.778437;

  // Parameters:
  g0 = 60.726808;
  g1 = 32.571928;
  g2 = 55.544312;
  g3 = 29.615803;
  g4 = 11.605226;
  g5 = 2.317583;
  g6 = 70.405859;
  g7 = 51.37192;
  g8 = 77.14732;
  k0 = 0.273447;
  k1 = 0.493661;
  k2 = 0.734521;
  k3 = 0.859502;
  k4 = 0.330598;
  k5 = 0.110274;
  k6 = 0.606847;
  k7 = 0.169617;
  k8 = 0.517101;
  T18 = 0.508334;
  T21 = 0.304738;
  T24 = 176.438161;
  T27 = 77.281631;
  T30 = 147.402934;
  T33 = 1.999704;
  T36 = 1.124663;
  T39 = 0.657552;
  T42 = 2.585215;
  T45 = 0.16908;
  T48 = 4.548093;
  T51 = 0.770751;
  T54 = 1.692884;
  T57 = 0.753413;
  T60 = 72.007902;
  T63 = 0.560898;
  T66 = 1.094887;
  n19 = 3;
  n22 = 1;
  n25 = 6;
  n28 = 2;
  n31 = 3;
  n34 = 6;
  n37 = 5;
  n40 = 6;
  n43 = 5;
  n46 = 5;
  n49 = 2;
  n52 = 4;
  n55 = 2;
  n58 = 4;
  n61 = 1;
  n64 = 4;
  n67 = 1;
  lambda20 = 0.018395;
  lambda23 = 0.016475;
  lambda26 = 0.012651;
  lambda29 = 49.507557;
  lambda32 = 1.320845;
  lambda35 = 0.017615;
  lambda38 = 0.222778;
  lambda41 = 26.125408;
  lambda44 = 2.015508;
  lambda47 = 51.325665;
  lambda50 = 0.013124;
  lambda53 = 0.297807;
  lambda56 = 0.017652;
  lambda59 = 0.010152;
  lambda62 = 55.170503;
  lambda65 = 0.075245;
  lambda68 = 0.056252;

  // Reactions:
  eq_1: -> OVOL; g0*hillfunction(ZEB, T42, lambda44, n43)*hillfunction(OVOL, T60, lambda62, n61)*hillfunction(Wg, T63, lambda65, n64)*(hillfunction(SMAD, T66, lambda68, n67)/lambda68) - k0*OVOL;
  eq_2: -> SMAD; g1 - k1*SMAD;
  eq_3: -> SNAIL; g2*(hillfunction(TGFB, T18, lambda20, n19)/lambda20)*hillfunction(SNAIL, T21, lambda23, n22)*hillfunction(miR34, T33, lambda35, n34) - k2*SNAIL;
  eq_4: -> STAT3; g3*(hillfunction(OVOL, T54, lambda56, n55)/lambda56) - k3*STAT3;
  eq_5: -> TGFB; g4 - k4*TGFB;
  eq_6: -> Wg; g5 - k5*Wg;
  eq_7: -> ZEB; g6*(hillfunction(SNAIL, T30, lambda32, n31)/lambda32)*(hillfunction(ZEB, T45, lambda47, n46)/lambda47)*hillfunction(miR200, T48, lambda50, n49)*hillfunction(OVOL, T57, lambda59, n58) - k6*ZEB;
  eq_8: -> miR200; g7*hillfunction(SNAIL, T27, lambda29, n28)*hillfunction(ZEB, T39, lambda41, n40)*(hillfunction(STAT3, T51, lambda53, n52)/lambda53) - k7*miR200;
  eq_9: -> miR34; g8*hillfunction(SNAIL, T24, lambda26, n25)*hillfunction(ZEB, T36, lambda38, n37) - k8*miR34;
end
