// SBML level 2 version 3

function hillfunction(x, OVOL, lamda, nx)
  lamda + (1 - lamda)*(1/(1 + (x/OVOL)^nx));
end

model No_3_model_1()

  // Species:
  species OVOL = 0.199988;
  species SMAD = 24.253042;
  species SNAIL = 76.961144;
  species TGFB = 151.311687;
  species Wg = 18.045394;
  species ZEB = 208.091593;
  species miR200 = 0.039629;
  species miR34 = 0.02141;

  // Parameters:
  g0 = 91.070636;
  g1 = 15.234441;
  g2 = 77.73911;
  g3 = 35.297318;
  g4 = 15.647651;
  g5 = 66.050266;
  g6 = 36.13385;
  g7 = 2.751141;
  k0 = 0.257233;
  k1 = 0.628146;
  k2 = 0.155758;
  k3 = 0.233276;
  k4 = 0.867127;
  k5 = 0.316837;
  k6 = 0.975396;
  k7 = 0.241171;
  T16 = 0.034933;
  T19 = 0.069569;
  T22 = 175.696526;
  T25 = 17.036708;
  T28 = 34.87975;
  T31 = 1.403783;
  T34 = 14.722397;
  T37 = 3.066921;
  T40 = 0.419964;
  T43 = 13.729149;
  T46 = 0.740522;
  T49 = 3.311537;
  T52 = 1.409713;
  T55 = 4.012543;
  T58 = 1.49226;
  n17 = 4;
  n20 = 4;
  n23 = 3;
  n26 = 6;
  n29 = 5;
  n32 = 1;
  n35 = 2;
  n38 = 2;
  n41 = 6;
  n44 = 2;
  n47 = 6;
  n50 = 1;
  n53 = 2;
  n56 = 3;
  n59 = 5;
  lambda18 = 0.015214;
  lambda21 = 0.027475;
  lambda24 = 0.114483;
  lambda27 = 42.095956;
  lambda30 = 13.270625;
  lambda33 = 0.138867;
  lambda36 = 0.093788;
  lambda39 = 97.061844;
  lambda42 = 23.467074;
  lambda45 = 0.026412;
  lambda48 = 0.417784;
  lambda51 = 0.012771;
  lambda54 = 0.019951;
  lambda57 = 0.012491;
  lambda60 = 0.148591;

  // Reactions:
  eq_1: -> OVOL; g0*hillfunction(ZEB, T40, lambda42, n41)*hillfunction(OVOL, T52, lambda54, n53)*hillfunction(Wg, T55, lambda57, n56)*(hillfunction(SMAD, T58, lambda60, n59)/lambda60) - k0*OVOL;
  eq_2: -> SMAD; g1 - k1*SMAD;
  eq_3: -> SNAIL; g2*(hillfunction(TGFB, T16, lambda18, n17)/lambda18)*hillfunction(SNAIL, T19, lambda21, n20)*hillfunction(miR34, T31, lambda33, n32) - k2*SNAIL;
  eq_4: -> TGFB; g3 - k3*TGFB;
  eq_5: -> Wg; g4 - k4*Wg;
  eq_6: -> ZEB; g5*(hillfunction(SNAIL, T28, lambda30, n29)/lambda30)*(hillfunction(ZEB, T43, lambda45, n44)/lambda45)*hillfunction(miR200, T46, lambda48, n47)*hillfunction(OVOL, T49, lambda51, n50) - k5*ZEB;
  eq_7: -> miR200; g6*hillfunction(SNAIL, T25, lambda27, n26)*hillfunction(ZEB, T37, lambda39, n38) - k6*miR200;
  eq_8: -> miR34; g7*hillfunction(SNAIL, T22, lambda24, n23)*hillfunction(ZEB, T34, lambda36, n35) - k7*miR34;
end
