// SBML level 2 version 3

function hillfunction(x, Ecadherin, lamda, nx)
  lamda + (1 - lamda)*(1/(1 + (x/Ecadherin)^nx));
end

model No_1_model_2()

  // Species:
  species Ecadherin = 0.0012;
  species OVOL = 1.552457;
  species SNAIL = 114.797318;
  species TGFB = 166.375104;
  species VIMENTIN = 151.737899;
  species ZEB1 = 521.085299;
  species exTGFB = 41.318719;
  species miR200 = 0.209631;
  species miR34 = 0.225217;

  // Parameters:
  g0 = 4.740002;
  g1 = 78.717362;
  g2 = 975.466231;
  g3 = 95.427344;
  g4 = 42.832161;
  g5 = 89.747894;
  g6 = 25.333252;
  g7 = 99.368989;
  g8 = 56.375483;
  k0 = 0.552115;
  k1 = 0.842217;
  k2 = 0.171002;
  k3 = 0.550639;
  k4 = 0.268791;
  k5 = 0.171971;
  k6 = 0.613118;
  k7 = 0.229946;
  k8 = 0.667451;
  T18 = 2.633072;
  T21 = 3.203589;
  T24 = 2.913329;
  T27 = 30.079646;
  T30 = 9.447385;
  T33 = 3.228482;
  T36 = 2.461017;
  T39 = 7.793736;
  T42 = 41.001145;
  T45 = 2.925792;
  T48 = 1.086016;
  T51 = 1.506041;
  T54 = 30.242717;
  T57 = 4.27133;
  T60 = 40.383488;
  T63 = 6.776631;
  T66 = 3.712325;
  T69 = 0.872278;
  T72 = 1.087868;
  T75 = 4.515009;
  n19 = 6;
  n22 = 5;
  n25 = 1;
  n28 = 5;
  n31 = 4;
  n34 = 4;
  n37 = 4;
  n40 = 5;
  n43 = 1;
  n46 = 2;
  n49 = 6;
  n52 = 2;
  n55 = 1;
  n58 = 3;
  n61 = 2;
  n64 = 3;
  n67 = 3;
  n70 = 4;
  n73 = 5;
  n76 = 2;
  lambda20 = 0.012881;
  lambda23 = 0.010851;
  lambda26 = 0.011112;
  lambda29 = 49.274475;
  lambda32 = 72.038022;
  lambda35 = 0.024148;
  lambda38 = 0.010159;
  lambda41 = 0.010373;
  lambda44 = 0.037668;
  lambda47 = 0.012519;
  lambda50 = 61.509343;
  lambda53 = 98.687237;
  lambda56 = 0.021653;
  lambda59 = 80.529962;
  lambda62 = 0.022558;
  lambda65 = 0.055646;
  lambda68 = 0.025335;
  lambda71 = 0.019147;
  lambda74 = 0.021876;
  lambda77 = 0.121822;

  // Reactions:
  eq_1: -> Ecadherin; g0*hillfunction(SNAIL, T36, lambda38, n37)*hillfunction(ZEB1, T39, lambda41, n40) - k0*Ecadherin;
  eq_2: -> OVOL; g1*hillfunction(ZEB1, T57, lambda59, n58) - k1*OVOL;
  eq_3: -> SNAIL; g2*(hillfunction(exTGFB, T18, lambda20, n19)/lambda20)*(hillfunction(TGFB, T21, lambda23, n22)/lambda23)*hillfunction(SNAIL, T27, lambda29, n28)*hillfunction(miR34, T48, lambda50, n49)*hillfunction(OVOL, T75, lambda77, n76) - k2*SNAIL;
  eq_4: -> TGFB; g3*hillfunction(OVOL, T69, lambda71, n70)*hillfunction(miR200, T72, lambda74, n73) - k3*TGFB;
  eq_5: -> VIMENTIN; g4*(hillfunction(SNAIL, T24, lambda26, n25)/lambda26)*(hillfunction(ZEB1, T33, lambda35, n34)/lambda35)*hillfunction(OVOL, T42, lambda44, n43) - k4*VIMENTIN;
  eq_6: -> ZEB1; g5*(hillfunction(SNAIL, T30, lambda32, n31)/lambda32)*hillfunction(OVOL, T54, lambda56, n55)*hillfunction(miR200, T63, lambda65, n64) - k5*ZEB1;
  eq_7: -> exTGFB; g6 - k6*exTGFB;
  eq_8: -> miR200; g7*hillfunction(ZEB1, T60, lambda62, n61)*hillfunction(SNAIL, T66, lambda68, n67) - k7*miR200;
  eq_9: -> miR34; g8*hillfunction(SNAIL, T45, lambda47, n46)*hillfunction(ZEB1, T51, lambda53, n52) - k8*miR34;
end
