// SBML level 2 version 3

function hillfunction(x, Ecadherin, lamda, nx)
  lamda + (1 - lamda)*(1/(1 + (x/Ecadherin)^nx));
end

model No_3_model_1()

  // Species:
  species Ecadherin = 30.915194;
  species OVOL = 117.017579;
  species SNAIL = 0.488425;
  species TGFB = 0.468836;
  species VIMENTIN = 0.000861;
  species ZEB1 = 0.000945;
  species exTGFB = 283.523041;
  species miR200 = 73.618938;
  species miR34 = 316.366613;

  // Parameters:
  g0 = 31.70886;
  g1 = 88.005011;
  g2 = 700.412793;
  g3 = 93.432284;
  g4 = 18.296042;
  g5 = 42.063346;
  g6 = 76.134641;
  g7 = 22.439013;
  g8 = 44.468193;
  k0 = 0.989124;
  k1 = 0.752067;
  k2 = 0.25236;
  k3 = 0.977003;
  k4 = 0.388264;
  k5 = 0.714169;
  k6 = 0.268531;
  k7 = 0.286147;
  k8 = 0.140555;
  T18 = 2.53534;
  T21 = 2.761591;
  T24 = 2.056672;
  T27 = 162.92516;
  T30 = 10.640675;
  T33 = 3.713236;
  T36 = 1.702701;
  T39 = 45.434397;
  T42 = 1.083689;
  T45 = 0.761596;
  T48 = 2.191445;
  T51 = 1.337419;
  T54 = 29.098343;
  T57 = 3.839091;
  T60 = 44.689521;
  T63 = 10.003893;
  T66 = 2.452341;
  T69 = 1.822493;
  T72 = 3.970957;
  T75 = 2.703766;
  n19 = 2;
  n22 = 1;
  n25 = 4;
  n28 = 6;
  n31 = 1;
  n34 = 5;
  n37 = 2;
  n40 = 3;
  n43 = 3;
  n46 = 6;
  n49 = 3;
  n52 = 5;
  n55 = 2;
  n58 = 5;
  n61 = 4;
  n64 = 5;
  n67 = 1;
  n70 = 2;
  n73 = 5;
  n76 = 3;
  lambda20 = 0.012716;
  lambda23 = 0.077626;
  lambda26 = 0.028958;
  lambda29 = 76.691062;
  lambda32 = 13.915907;
  lambda35 = 0.115275;
  lambda38 = 0.024921;
  lambda41 = 0.011105;
  lambda44 = 0.031988;
  lambda47 = 0.153257;
  lambda50 = 95.651042;
  lambda53 = 88.837699;
  lambda56 = 0.019091;
  lambda59 = 86.835947;
  lambda62 = 0.01077;
  lambda65 = 0.044243;
  lambda68 = 0.02597;
  lambda71 = 0.092049;
  lambda74 = 0.013347;
  lambda77 = 0.586287;

  // Reactions:
  eq_1: -> Ecadherin; g0*hillfunction(SNAIL, T36, lambda38, n37)*hillfunction(ZEB1, T39, lambda41, n40) - k0*Ecadherin;
  eq_2: -> OVOL; g1*hillfunction(ZEB1, T57, lambda59, n58) - k1*OVOL;
  eq_3: -> SNAIL; g2*(hillfunction(exTGFB, T18, lambda20, n19)/lambda20)*(hillfunction(TGFB, T21, lambda23, n22)/lambda23)*hillfunction(SNAIL, T27, lambda29, n28)*hillfunction(miR34, T48, lambda50, n49)*hillfunction(OVOL, T75, lambda77, n76) - k2*SNAIL;
  eq_4: -> TGFB; g3*hillfunction(OVOL, T69, lambda71, n70)*hillfunction(miR200, T72, lambda74, n73) - k3*TGFB;
  eq_5: -> VIMENTIN; g4*(hillfunction(SNAIL, T24, lambda26, n25)/lambda26)*(hillfunction(ZEB1, T33, lambda35, n34)/lambda35)*hillfunction(OVOL, T42, lambda44, n43) - k4*VIMENTIN;
  eq_6: -> ZEB1; g5*(hillfunction(SNAIL, T30, lambda32, n31)/lambda32)*hillfunction(OVOL, T54, lambda56, n55)*hillfunction(miR200, T63, lambda65, n64) - k5*ZEB1;
  eq_7: -> exTGFB; g6 - k6*exTGFB;
  eq_8: -> miR200; g7*hillfunction(ZEB1, T60, lambda62, n61)*hillfunction(SNAIL, T66, lambda68, n67) - k7*miR200;
  eq_9: -> miR34; g8*hillfunction(SNAIL, T45, lambda47, n46)*hillfunction(ZEB1, T51, lambda53, n52) - k8*miR34;
end
