// SBML level 2 version 3

function hillfunction(x, X, lamda, nx)
  lamda + (1 - lamda)*(1/(1 + (x/X)^nx));
end

model No_2_model_1()

  // Species:
  species X = 16.783678;
  species SNAIL = 0.177172;
  species miR34 = 153.046064;
  species miR200 = 343.059322;
  species ZEB = 0.000441;
  species KEAP1 = 1.420767;
  species Ecadherin = 207.512872;
  species NRF2 = 1.429601;

  // Parameters:
  g0 = 4.836927;
  g1 = 87.761874;
  g2 = 66.232415;
  g3 = 98.70006;
  g4 = 37.429755;
  g5 = 58.856206;
  g6 = 48.027455;
  g7 = 35.837626;
  k0 = 0.288192;
  k1 = 0.870794;
  k2 = 0.379778;
  k3 = 0.150102;
  k4 = 0.555696;
  k5 = 0.727728;
  k6 = 0.231443;
  k7 = 0.688486;
  T16 = 130.394661;
  T19 = 8.099349;
  T22 = 0.123398;
  T25 = 11.737816;
  T28 = 1.194704;
  T31 = 0.161858;
  T34 = 0.182804;
  T37 = 0.943352;
  T40 = 0.607851;
  T43 = 6.173312;
  T46 = 0.536173;
  T49 = 40.979292;
  T52 = 4.327626;
  T55 = 0.362492;
  T58 = 23.999797;
  T61 = 20.090216;
  n17 = 1;
  n20 = 3;
  n23 = 3;
  n26 = 2;
  n29 = 1;
  n32 = 6;
  n35 = 2;
  n38 = 4;
  n41 = 5;
  n44 = 3;
  n47 = 2;
  n50 = 1;
  n53 = 4;
  n56 = 2;
  n59 = 3;
  n62 = 6;
  lambda18 = 10.314037;
  lambda21 = 0.033338;
  lambda24 = 0.018602;
  lambda27 = 0.01645;
  lambda30 = 0.051986;
  lambda33 = 0.020937;
  lambda36 = 0.012552;
  lambda39 = 0.307994;
  lambda42 = 32.546527;
  lambda45 = 0.022618;
  lambda48 = 22.040523;
  lambda51 = 0.035416;
  lambda54 = 0.017567;
  lambda57 = 0.019411;
  lambda60 = 0.02596;
  lambda63 = 0.045442;

  // Reactions:
  eq_1: -> X; g0 - k0*X;
  eq_2: -> SNAIL; g1*(hillfunction(X, T16, lambda18, n17)/lambda18)*hillfunction(miR34, T19, lambda21, n20)*hillfunction(SNAIL, T22, lambda24, n23)*hillfunction(NRF2, T61, lambda63, n62) - k1*SNAIL;
  eq_3: -> miR34; g2*hillfunction(SNAIL, T25, lambda27, n26)*hillfunction(ZEB, T43, lambda45, n44) - k2*miR34;
  eq_4: -> miR200; g3*hillfunction(SNAIL, T28, lambda30, n29)*hillfunction(ZEB, T46, lambda48, n47) - k3*miR200;
  eq_5: -> ZEB; g4*(hillfunction(SNAIL, T31, lambda33, n32)/lambda33)*hillfunction(miR200, T34, lambda36, n35)*(hillfunction(ZEB, T40, lambda42, n41)/lambda42)*hillfunction(Ecadherin, T52, lambda54, n53) - k4*ZEB;
  eq_6: -> KEAP1; g5*hillfunction(miR200, T37, lambda39, n38) - k5*KEAP1;
  eq_7: -> Ecadherin; g6*hillfunction(ZEB, T49, lambda51, n50) - k6*Ecadherin;
  eq_8: -> NRF2; g7*hillfunction(Ecadherin, T55, lambda57, n56)*hillfunction(KEAP1, T58, lambda60, n59) - k7*NRF2;
end
