// SBML level 2 version 3

function hillfunction(x, SNAIL, lamda, nx)
  lamda + (1 - lamda)*(1/(1 + (x/SNAIL)^nx));
end

model No_2_model_2()

  // Species:
  species SNAIL = 75.700281;
  species ZEB = 0.049455;
  species miR200 = 86.663915;
  species miR145 = 47.508675;
  species OCT4 = 53.902454;

  // Parameters:
  g0 = 35.799752;
  g1 = 50.308992;
  g2 = 81.938074;
  g3 = 34.274269;
  g4 = 76.907581;
  k0 = 0.472914;
  k1 = 0.690524;
  k2 = 0.370367;
  k3 = 0.287149;
  k4 = 0.779055;
  T10 = 3.991934;
  T13 = 1.456335;
  T16 = 41.03156;
  T19 = 5.927298;
  T22 = 0.788145;
  T25 = 75.774367;
  T28 = 38.757775;
  T31 = 45.844842;
  T34 = 0.827135;
  T37 = 1.097187;
  n11 = 5;
  n14 = 5;
  n17 = 3;
  n20 = 5;
  n23 = 3;
  n26 = 3;
  n29 = 3;
  n32 = 3;
  n35 = 6;
  n38 = 1;
  lambda12 = 0.038852;
  lambda15 = 26.074071;
  lambda18 = 1.977837;
  lambda21 = 0.488732;
  lambda24 = 0.102966;
  lambda27 = 0.058514;
  lambda30 = 26.183875;
  lambda33 = 0.027667;
  lambda36 = 0.014209;
  lambda39 = 0.535534;

  // Reactions:
  eq_1: -> SNAIL; g0 - k0*SNAIL;
  eq_2: -> ZEB; g1*hillfunction(miR200, T10, lambda12, n11)*(hillfunction(ZEB, T16, lambda18, n17)/lambda18)*(hillfunction(SNAIL, T22, lambda24, n23)/lambda24)*hillfunction(miR145, T34, lambda36, n35) - k1*ZEB;
  eq_3: -> miR200; g2*hillfunction(ZEB, T13, lambda15, n14)*hillfunction(SNAIL, T19, lambda21, n20)*(hillfunction(OCT4, T25, lambda27, n26)/lambda27) - k2*miR200;
  eq_4: -> miR145; g3*hillfunction(OCT4, T31, lambda33, n32)*hillfunction(ZEB, T37, lambda39, n38) - k3*miR145;
  eq_5: -> OCT4; g4*hillfunction(miR145, T28, lambda30, n29) - k4*OCT4;
end
