// SBML level 2 version 3

function hillfunction(x, SNAIL, lamda, nx)
  lamda + (1 - lamda)*(1/(1 + (x/SNAIL)^nx));
end

model No_3_model_1()

  // Species:
  species SNAIL = 56.220723;
  species ZEB = 0.000296;
  species miR200 = 31.049242;
  species OVOL2 = 15.326029;

  // Parameters:
  g0 = 45.979225;
  g1 = 85.878066;
  g2 = 75.478742;
  g3 = 99.333744;
  k0 = 0.817834;
  k1 = 0.350151;
  k2 = 0.161556;
  k3 = 0.434154;
  T8 = 112.741439;
  T11 = 2.272516;
  T14 = 1.126523;
  T17 = 1.820489;
  T20 = 66.930392;
  T23 = 0.169956;
  T26 = 6.90168;
  T29 = 1.351569;
  T32 = 8.105124;
  n9 = 4;
  n12 = 4;
  n15 = 5;
  n18 = 3;
  n21 = 6;
  n24 = 3;
  n27 = 5;
  n30 = 1;
  n33 = 6;
  lambda10 = 54.457098;
  lambda13 = 0.019651;
  lambda16 = 65.347554;
  lambda19 = 0.051409;
  lambda22 = 0.023386;
  lambda25 = 0.024707;
  lambda28 = 0.072201;
  lambda31 = 0.010861;
  lambda34 = 0.046588;

  // Reactions:
  eq_1: -> SNAIL; g0 - k0*SNAIL;
  eq_2: -> ZEB; g1*(hillfunction(SNAIL, T8, lambda10, n9)/lambda10)*hillfunction(miR200, T14, lambda16, n15)*(hillfunction(ZEB, T20, lambda22, n21)/lambda22)*hillfunction(OVOL2, T26, lambda28, n27) - k1*ZEB;
  eq_3: -> miR200; g2*hillfunction(SNAIL, T11, lambda13, n12)*hillfunction(ZEB, T17, lambda19, n18)*hillfunction(OVOL2, T32, lambda34, n33) - k2*miR200;
  eq_4: -> OVOL2; g3*hillfunction(ZEB, T23, lambda25, n24)*hillfunction(OVOL2, T29, lambda31, n30) - k3*OVOL2;
end
