// SBML level 2 version 3

function hillfunction(x, CD24, lamda, nx)
  lamda + (1 - lamda)*(1/(1 + (x/CD24)^nx));
end

model No_2_model_1()

  // Species:
  species CD24 = 30.372545;
  species CD44s = 13.556149;
  species CDH1 = 7.587523;
  species EMT = 1.326974;
  species ESRP1 = 162.417699;
  species Ex_TGFB = 10.545421;
  species GRHL2 = 34.534498;
  species HA = 47.557721;
  species HAS2 = 472.325714;
  species SNAIL1 = 0.176294;
  species TGFB = 0.009031;
  species VIM = 0.036458;
  species ZEB1 = 0.00004;
  species miR1199 = 99.029387;
  species miR190 = 154.624863;
  species miR200 = 88.192197;
  species miR34 = 25.812876;
  species miR340 = 119.395392;

  // Parameters:
  g0 = 73.524257;
  g1 = 29.074423;
  g2 = 5.317975;
  g3 = 25.700478;
  g4 = 94.379474;
  g5 = 9.195936;
  g6 = 4.422897;
  g7 = 23.41153;
  g8 = 47.777597;
  g9 = 51.600138;
  g10 = 7.992983;
  g11 = 26.794357;
  g12 = 2620.446;
  g13 = 86.475565;
  g14 = 58.084763;
  g15 = 85.624142;
  g16 = 16.067694;
  g17 = 52.611649;
  k0 = 0.909958;
  k1 = 0.521713;
  k2 = 0.628235;
  k3 = 0.447027;
  k4 = 0.581091;
  k5 = 0.872031;
  k6 = 0.128072;
  k7 = 0.49176;
  k8 = 0.101149;
  k9 = 0.442495;
  k10 = 0.656191;
  k11 = 0.546888;
  k12 = 0.513614;
  k13 = 0.873231;
  k14 = 0.375631;
  k15 = 0.152994;
  k16 = 0.621648;
  k17 = 0.440651;
  T36 = 39.675581;
  T39 = 25.911624;
  T42 = 1.478292;
  T45 = 0.116896;
  T48 = 12.225927;
  T51 = 7.769579;
  T54 = 0.76283;
  T57 = 0.830851;
  T60 = 48.170088;
  T63 = 0.736696;
  T66 = 71.290597;
  T69 = 10.077698;
  T72 = 1.508088;
  T75 = 38.239381;
  T78 = 32.560927;
  T81 = 1.579702;
  T84 = 1.103249;
  T87 = 0.286746;
  T90 = 1.217664;
  T93 = 10.798697;
  T96 = 3.528058;
  T99 = 40.876021;
  T102 = 31.957293;
  T105 = 26.299628;
  T108 = 22.420424;
  T111 = 46.372196;
  T114 = 0.454553;
  T117 = 0.803582;
  T120 = 0.028312;
  T123 = 0.713287;
  T126 = 1.597265;
  T129 = 0.868869;
  n37 = 4;
  n40 = 2;
  n43 = 1;
  n46 = 1;
  n49 = 2;
  n52 = 4;
  n55 = 2;
  n58 = 3;
  n61 = 3;
  n64 = 1;
  n67 = 2;
  n70 = 2;
  n73 = 2;
  n76 = 1;
  n79 = 6;
  n82 = 6;
  n85 = 2;
  n88 = 3;
  n91 = 4;
  n94 = 4;
  n97 = 2;
  n100 = 2;
  n103 = 3;
  n106 = 1;
  n109 = 1;
  n112 = 5;
  n115 = 4;
  n118 = 1;
  n121 = 1;
  n124 = 1;
  n127 = 3;
  n130 = 4;
  lambda38 = 56.626379;
  lambda41 = 0.223992;
  lambda44 = 0.029864;
  lambda47 = 0.058766;
  lambda50 = 0.02094;
  lambda53 = 31.530804;
  lambda56 = 0.089789;
  lambda59 = 0.070673;
  lambda62 = 95.424327;
  lambda65 = 0.012272;
  lambda68 = 29.090396;
  lambda71 = 22.12706;
  lambda74 = 0.169363;
  lambda77 = 0.043444;
  lambda80 = 0.05051;
  lambda83 = 0.014654;
  lambda86 = 78.059195;
  lambda89 = 50.247347;
  lambda92 = 40.858671;
  lambda95 = 0.032692;
  lambda98 = 0.01055;
  lambda101 = 0.018233;
  lambda104 = 0.011783;
  lambda107 = 0.015395;
  lambda110 = 85.618906;
  lambda113 = 63.599468;
  lambda116 = 0.037506;
  lambda119 = 0.018906;
  lambda122 = 0.022306;
  lambda125 = 0.021083;
  lambda128 = 0.01825;
  lambda131 = 0.028677;

  // Reactions:
  eq_1: -> CD24; g0*(hillfunction(GRHL2, T84, lambda86, n85)/lambda86) - k0*CD24;
  eq_2: -> CD44s; g1*hillfunction(ESRP1, T123, lambda125, n124) - k1*CD44s;
  eq_3: -> CDH1; g2*hillfunction(SNAIL1, T78, lambda80, n79)*hillfunction(ZEB1, T105, lambda107, n106) - k2*CDH1;
  eq_4: -> EMT; g3*hillfunction(CDH1, T108, lambda110, n109)*(hillfunction(VIM, T111, lambda113, n112)/lambda113) - k3*EMT;
  eq_5: -> ESRP1; g4*hillfunction(ZEB1, T120, lambda122, n121) - k4*ESRP1;
  eq_6: -> Ex_TGFB; g5 - k5*Ex_TGFB;
  eq_7: -> GRHL2; g6*hillfunction(ZEB1, T90, lambda92, n91) - k6*GRHL2;
  eq_8: -> HA; g7*(hillfunction(HAS2, T117, lambda119, n118)/lambda119) - k7*HA;
  eq_9: -> HAS2; g8*hillfunction(ZEB1, T114, lambda116, n115) - k8*HAS2;
  eq_10: -> SNAIL1; g9*(hillfunction(Ex_TGFB, T36, lambda38, n37)/lambda38)*(hillfunction(TGFB, T39, lambda41, n40)/lambda41)*hillfunction(SNAIL1, T45, lambda47, n46)*hillfunction(miR34, T48, lambda50, n49) - k9*SNAIL1;
  eq_11: -> TGFB; g10*hillfunction(miR190, T42, lambda44, n43)*hillfunction(miR200, T69, lambda71, n70) - k10*TGFB;
  eq_12: -> VIM; g11*(hillfunction(SNAIL1, T93, lambda95, n94)/lambda95)*(hillfunction(ZEB1, T96, lambda98, n97)/lambda98) - k11*VIM;
  eq_13: -> ZEB1; g12*(hillfunction(SNAIL1, T54, lambda56, n55)/lambda56)*hillfunction(miR340, T60, lambda62, n61)*hillfunction(miR200, T72, lambda74, n73)*hillfunction(CD24, T81, lambda83, n82)*hillfunction(GRHL2, T87, lambda89, n88)*hillfunction(miR1199, T99, lambda101, n100)*(hillfunction(HA, T126, lambda128, n127)/lambda128)*(hillfunction(CD44s, T129, lambda131, n130)/lambda131) - k12*ZEB1;
  eq_14: -> miR1199; g13*hillfunction(ZEB1, T102, lambda104, n103) - k13*miR1199;
  eq_15: -> miR190; g14*hillfunction(ZEB1, T63, lambda65, n64) - k14*miR190;
  eq_16: -> miR200; g15*hillfunction(SNAIL1, T66, lambda68, n67)*hillfunction(ZEB1, T75, lambda77, n76) - k15*miR200;
  eq_17: -> miR34; g16*hillfunction(SNAIL1, T51, lambda53, n52) - k16*miR34;
  eq_18: -> miR340; g17*hillfunction(ZEB1, T57, lambda59, n58) - k17*miR340;
end
