// SBML level 2 version 3

function hillfunction(x, Cdh1, lamda, nx)
  lamda + (1 - lamda)*(1/(1 + (x/Cdh1)^nx));
end

model No_3_model_4()

  // Species:
  species Cdh1 = 0.131294;
  species Ctnnb1 = 3.286523;
  species Dlx3 = 95.262842;
  species Esrp1 = 19.954605;
  species Grhl2 = 13.174959;
  species Hmgn3 = 112.948708;
  species Irf6 = 231.69445;
  species Lef1 = 2.920169;
  species Snai1 = 5.636978;
  species Snai2 = 14.08071;
  species Trp63 = 53.470749;
  species Twist1 = 9.193084;
  species Wnt = 70.736444;
  species Zeb1 = 2.867314;

  // Parameters:
  g0 = 605.433411;
  g1 = 38.532881;
  g2 = 83.223509;
  g3 = 9.374888;
  g4 = 19.392424;
  g5 = 93.12827;
  g6 = 77.970986;
  g7 = 23.105843;
  g8 = 50.610599;
  g9 = 95.251027;
  g10 = 51.888991;
  g11 = 72.23689;
  g12 = 64.752619;
  g13 = 44.728005;
  k0 = 0.884011;
  k1 = 0.294829;
  k2 = 0.849864;
  k3 = 0.336591;
  k4 = 0.690434;
  k5 = 0.824508;
  k6 = 0.316738;
  k7 = 0.449684;
  k8 = 0.443952;
  k9 = 0.655618;
  k10 = 0.716527;
  k11 = 0.190851;
  k12 = 0.915407;
  k13 = 0.155816;
  T28 = 1.956673;
  T31 = 0.988456;
  T34 = 2.173122;
  T37 = 2.964167;
  T40 = 13.570402;
  T43 = 1.435653;
  T46 = 164.899839;
  T49 = 1.075675;
  T52 = 0.380624;
  T55 = 4.643894;
  T58 = 2.159942;
  T61 = 4.305201;
  T64 = 15.750356;
  T67 = 4.703761;
  T70 = 22.063475;
  T73 = 0.326212;
  T76 = 3.511321;
  T79 = 2.026494;
  T82 = 17.773792;
  T85 = 4.575539;
  T88 = 1.61427;
  T91 = 1.345422;
  T94 = 7.185457;
  T97 = 3.324429;
  T100 = 4.156799;
  T103 = 62.67317;
  T106 = 68.368813;
  T109 = 2.188644;
  T112 = 34.130354;
  T115 = 5.632363;
  T118 = 2.207623;
  T121 = 2.909851;
  T124 = 3.731061;
  T127 = 1.8936;
  n29 = 1;
  n32 = 3;
  n35 = 2;
  n38 = 3;
  n41 = 5;
  n44 = 5;
  n47 = 5;
  n50 = 1;
  n53 = 1;
  n56 = 2;
  n59 = 2;
  n62 = 1;
  n65 = 5;
  n68 = 4;
  n71 = 2;
  n74 = 3;
  n77 = 1;
  n80 = 6;
  n83 = 2;
  n86 = 2;
  n89 = 2;
  n92 = 5;
  n95 = 3;
  n98 = 3;
  n101 = 6;
  n104 = 5;
  n107 = 6;
  n110 = 1;
  n113 = 3;
  n116 = 5;
  n119 = 1;
  n122 = 5;
  n125 = 2;
  n128 = 6;
  lambda30 = 0.014873;
  lambda33 = 0.017599;
  lambda36 = 0.013678;
  lambda39 = 0.018751;
  lambda42 = 10.799167;
  lambda45 = 87.038093;
  lambda48 = 71.112666;
  lambda51 = 0.010983;
  lambda54 = 31.674274;
  lambda57 = 0.01106;
  lambda60 = 2.259058;
  lambda63 = 0.037221;
  lambda66 = 99.072964;
  lambda69 = 68.075181;
  lambda72 = 4.132053;
  lambda75 = 6.042558;
  lambda78 = 21.73411;
  lambda81 = 69.774611;
  lambda84 = 40.676629;
  lambda87 = 0.010915;
  lambda90 = 0.425727;
  lambda93 = 9.373869;
  lambda96 = 78.266441;
  lambda99 = 39.184628;
  lambda102 = 90.915364;
  lambda105 = 41.791795;
  lambda108 = 5.182256;
  lambda111 = 74.626154;
  lambda114 = 30.36967;
  lambda117 = 9.288662;
  lambda120 = 22.800512;
  lambda123 = 67.25571;
  lambda126 = 77.417541;
  lambda129 = 0.01432;

  // Reactions:
  eq_1: -> Cdh1; g0*hillfunction(Snai2, T46, lambda48, n47)*hillfunction(Twist1, T61, lambda63, n62)*hillfunction(Snai1, T76, lambda78, n77)*hillfunction(Zeb1, T82, lambda84, n83)*(hillfunction(Irf6, T85, lambda87, n86)/lambda87)*(hillfunction(Grhl2, T88, lambda90, n89)/lambda90) - k0*Cdh1;
  eq_2: -> Ctnnb1; g1*(hillfunction(Wnt, T28, lambda30, n29)/lambda30)*hillfunction(Cdh1, T34, lambda36, n35) - k1*Ctnnb1;
  eq_3: -> Dlx3; g2*(hillfunction(Grhl2, T106, lambda108, n107)/lambda108) - k2*Dlx3;
  eq_4: -> Esrp1; g3*hillfunction(Zeb1, T79, lambda81, n80)*(hillfunction(Grhl2, T100, lambda102, n101)/lambda102) - k3*Esrp1;
  eq_5: -> Grhl2; g4*hillfunction(Zeb1, T94, lambda96, n95)*(hillfunction(Esrp1, T97, lambda99, n98)/lambda99)*(hillfunction(Trp63, T115, lambda117, n116)/lambda117)*(hillfunction(Irf6, T121, lambda123, n122)/lambda123) - k4*Grhl2;
  eq_6: -> Hmgn3; g5*(hillfunction(Grhl2, T109, lambda111, n110)/lambda111) - k5*Hmgn3;
  eq_7: -> Irf6; g6*(hillfunction(Trp63, T118, lambda120, n119)/lambda120)*(hillfunction(Grhl2, T124, lambda126, n125)/lambda126) - k6*Irf6;
  eq_8: -> Lef1; g7*(hillfunction(Ctnnb1, T31, lambda33, n32)/lambda33) - k7*Lef1;
  eq_9: -> Snai1; g8*hillfunction(Snai2, T55, lambda57, n56)*hillfunction(Snai1, T58, lambda60, n59)*(hillfunction(Twist1, T67, lambda69, n68)/lambda69) - k8*Snai1;
  eq_10: -> Snai2; g9*(hillfunction(Ctnnb1, T40, lambda42, n41)/lambda42)*(hillfunction(Snai2, T43, lambda45, n44)/lambda45)*(hillfunction(Twist1, T49, lambda51, n50)/lambda51) - k9*Snai2;
  eq_11: -> Trp63; g10*(hillfunction(Dlx3, T103, lambda105, n104)/lambda105)*(hillfunction(Hmgn3, T112, lambda114, n113)/lambda114)*(hillfunction(Grhl2, T127, lambda129, n128)/lambda129) - k10*Trp63;
  eq_12: -> Twist1; g11*(hillfunction(Lef1, T37, lambda39, n38)/lambda39)*(hillfunction(Snai2, T52, lambda54, n53)/lambda54)*(hillfunction(Snai1, T64, lambda66, n65)/lambda66) - k11*Twist1;
  eq_13: -> Wnt; g12 - k12*Wnt;
  eq_14: -> Zeb1; g13*(hillfunction(Twist1, T70, lambda72, n71)/lambda72)*(hillfunction(Snai1, T73, lambda75, n74)/lambda75)*hillfunction(Grhl2, T91, lambda93, n92) - k13*Zeb1;
end
