// SBML level 2 version 3

function hillfunction(x, CI, lamda, nx)
  lamda + (1 - lamda)*(1/(1 + (x/CI)^nx));
end

model No_2_model_1()

  // Species:
  species CI = 82.594072;
  species CIA = 7.275825;
  species CIR = 10.293382;
  species EN = 6.553082;
  species FZ1 = 29.051482;
  species FZ2 = 47.342417;
  species HH1 = 1.725329;
  species HH2 = 21.473188;
  species PH1 = 3.083051;
  species PH2 = 0.415537;
  species PTC1 = 15.057334;
  species PTC2 = 54.034548;
  species SLP = 67.317541;
  species SMO1 = 0.235867;
  species WG1 = 14.783827;
  species WG2 = 66.607988;
  species ci = 152.387327;
  species en = 2.874936;
  species hh = 0.113035;
  species ptc = 13.511489;
  species smo = 55.573602;
  species wg = 2.619387;

  // Parameters:
  g0 = 69.341464;
  g1 = 95.012012;
  g2 = 6.600027;
  g3 = 76.943556;
  g4 = 22.440996;
  g5 = 27.790638;
  g6 = 36.672258;
  g7 = 15.674706;
  g8 = 7.426032;
  g9 = 32.693952;
  g10 = 10.916154;
  g11 = 26.753726;
  g12 = 50.79206;
  g13 = 7.774936;
  g14 = 14.767776;
  g15 = 13.452956;
  g16 = 46.981041;
  g17 = 52.205973;
  g18 = 65.472368;
  g19 = 58.927864;
  g20 = 46.948843;
  g21 = 31.741648;
  k0 = 0.838063;
  k1 = 0.471611;
  k2 = 0.381603;
  k3 = 0.965788;
  k4 = 0.381413;
  k5 = 0.586186;
  k6 = 0.478301;
  k7 = 0.729966;
  k8 = 0.760988;
  k9 = 0.607525;
  k10 = 0.672964;
  k11 = 0.495123;
  k12 = 0.754514;
  k13 = 0.628355;
  k14 = 0.996467;
  k15 = 0.201972;
  k16 = 0.308057;
  k17 = 0.71744;
  k18 = 0.338861;
  k19 = 0.240375;
  k20 = 0.844805;
  k21 = 0.176933;
  T44 = 6.53667;
  T47 = 65.682281;
  T50 = 1.366043;
  T53 = 10.700733;
  T56 = 0.334764;
  T59 = 16.204236;
  T62 = 67.458416;
  T65 = 76.064994;
  T68 = 9.800134;
  T71 = 7.392489;
  T74 = 104.917086;
  T77 = 36.517135;
  T80 = 63.891335;
  T83 = 3.809811;
  T86 = 105.846389;
  T89 = 65.316384;
  T92 = 4.485148;
  T95 = 0.799608;
  T98 = 27.279069;
  T101 = 130.582458;
  T104 = 67.430197;
  T107 = 48.290577;
  T110 = 4.097318;
  T113 = 60.659479;
  T116 = 7.407414;
  T119 = 9.229436;
  T122 = 16.320236;
  T125 = 147.042471;
  T128 = 18.590845;
  n45 = 2;
  n48 = 3;
  n51 = 2;
  n54 = 6;
  n57 = 1;
  n60 = 5;
  n63 = 4;
  n66 = 4;
  n69 = 1;
  n72 = 6;
  n75 = 5;
  n78 = 4;
  n81 = 6;
  n84 = 2;
  n87 = 4;
  n90 = 1;
  n93 = 4;
  n96 = 5;
  n99 = 5;
  n102 = 3;
  n105 = 4;
  n108 = 5;
  n111 = 4;
  n114 = 4;
  n117 = 4;
  n120 = 5;
  n123 = 1;
  n126 = 1;
  n129 = 6;
  lambda46 = 25.840746;
  lambda49 = 48.791362;
  lambda52 = 39.196035;
  lambda55 = 9.190269;
  lambda58 = 0.02055;
  lambda61 = 12.181415;
  lambda64 = 79.47733;
  lambda67 = 0.011086;
  lambda70 = 89.06038;
  lambda73 = 35.329494;
  lambda76 = 3.125087;
  lambda79 = 39.904758;
  lambda82 = 18.220852;
  lambda85 = 38.517413;
  lambda88 = 55.667367;
  lambda91 = 0.62254;
  lambda94 = 15.600637;
  lambda97 = 13.615416;
  lambda100 = 0.012463;
  lambda103 = 0.012039;
  lambda106 = 83.768914;
  lambda109 = 61.768338;
  lambda112 = 0.011835;
  lambda115 = 0.017316;
  lambda118 = 0.011408;
  lambda121 = 46.110909;
  lambda124 = 0.011671;
  lambda127 = 87.432736;
  lambda130 = 14.26531;

  // Reactions:
  eq_1: -> CI; g0*(hillfunction(ci, T53, lambda55, n54)/lambda55) - k0*CI;
  eq_2: -> CIA; g1*(hillfunction(CI, T89, lambda91, n90)/lambda91)*(hillfunction(SMO1, T110, lambda112, n111)/lambda112) - k1*CIA;
  eq_3: -> CIR; g2*(hillfunction(CI, T86, lambda88, n87)/lambda88)*hillfunction(SMO1, T113, lambda115, n114) - k2*CIR;
  eq_4: -> EN; g3*(hillfunction(en, T68, lambda70, n69)/lambda70) - k3*EN;
  eq_5: -> FZ1; g4*(hillfunction(WG2, T122, lambda124, n123)/lambda124) - k4*FZ1;
  eq_6: -> FZ2; g5*hillfunction(WG1, T101, lambda103, n102) - k5*FZ2;
  eq_7: -> HH1; g6*(hillfunction(hh, T65, lambda67, n66)/lambda67) - k6*HH1;
  eq_8: -> HH2; g7 - k7*HH2;
  eq_9: -> PH1; g8*(hillfunction(PTC1, T104, lambda106, n105)/lambda106)*(hillfunction(HH2, T128, lambda130, n129)/lambda130) - k8*PH1;
  eq_10: -> PH2; g9*(hillfunction(HH1, T119, lambda121, n120)/lambda121)*(hillfunction(PTC2, T125, lambda127, n126)/lambda127) - k9*PH2;
  eq_11: -> PTC1; g10*(hillfunction(ptc, T80, lambda82, n81)/lambda82) - k10*PTC1;
  eq_12: -> PTC2; g11 - k11*PTC2;
  eq_13: -> SLP; g12 - k12*SLP;
  eq_14: -> SMO1; g13*(hillfunction(smo, T83, lambda85, n84)/lambda85)*hillfunction(PTC1, T107, lambda109, n108)*(hillfunction(PH1, T116, lambda118, n117)/lambda118) - k13*SMO1;
  eq_15: -> WG1; g14*(hillfunction(wg, T77, lambda79, n78)/lambda79) - k14*WG1;
  eq_16: -> WG2; g15 - k15*WG2;
  eq_17: -> ci; g16*hillfunction(EN, T47, lambda49, n48) - k16*ci;
  eq_18: -> en; g17*hillfunction(SLP, T71, lambda73, n72)*(hillfunction(FZ1, T98, lambda100, n99)/lambda100) - k17*en;
  eq_19: -> hh; g18*(hillfunction(EN, T44, lambda46, n45)/lambda46)*hillfunction(CIR, T56, lambda58, n57) - k18*hh;
  eq_20: -> ptc; g19*hillfunction(EN, T50, lambda52, n51)*hillfunction(CIR, T62, lambda64, n63)*(hillfunction(CIA, T95, lambda97, n96)/lambda97) - k19*ptc;
  eq_21: -> smo; g20 - k20*smo;
  eq_22: -> wg; g21*hillfunction(CIR, T59, lambda61, n60)*(hillfunction(SLP, T74, lambda76, n75)/lambda76)*(hillfunction(CIA, T92, lambda94, n93)/lambda94) - k21*wg;
end
