// SBML level 2 version 3

function hillfunction(x, ETGF, lamda, nx)
  lamda + (1 - lamda)*(1/(1 + (x/ETGF)^nx));
end

model No_1_model_2()

  // Species:
  species ETGF = 252.554514;
  species SNAIL = 35.208404;
  species ZEB = 57.913262;
  species MIR34 = 0.158886;
  species TGF = 110.089171;
  species MIR200 = 3.510828;
  species OVOL2 = 0.681813;
  species ECAD = 0.940857;
  species VIM = 161.371103;

  // Parameters:
  g0 = 47.518039;
  g1 = 745.920443;
  g2 = 49.116622;
  g3 = 26.783328;
  g4 = 89.459275;
  g5 = 39.39382;
  g6 = 39.043965;
  g7 = 50.487812;
  g8 = 99.35715;
  k0 = 0.18815;
  k1 = 0.76335;
  k2 = 0.848103;
  k3 = 0.178599;
  k4 = 0.811613;
  k5 = 0.356772;
  k6 = 0.619365;
  k7 = 0.715246;
  k8 = 0.599668;
  T18 = 110.240322;
  T21 = 2.117779;
  T24 = 4.262558;
  T27 = 3.5503;
  T30 = 21.868482;
  T33 = 0.254241;
  T36 = 42.198461;
  T39 = 24.566964;
  T42 = 3.34482;
  T45 = 2.63754;
  T48 = 49.22253;
  T51 = 3.640394;
  T54 = 2.529229;
  T57 = 2.923272;
  T60 = 4.211092;
  T63 = 4.293887;
  T66 = 4.270792;
  T69 = 0.714554;
  T72 = 28.431422;
  n19 = 4;
  n22 = 3;
  n25 = 3;
  n28 = 1;
  n31 = 1;
  n34 = 4;
  n37 = 5;
  n40 = 5;
  n43 = 1;
  n46 = 3;
  n49 = 4;
  n52 = 4;
  n55 = 2;
  n58 = 3;
  n61 = 3;
  n64 = 5;
  n67 = 2;
  n70 = 1;
  n73 = 3;
  lambda20 = 41.372489;
  lambda23 = 0.039454;
  lambda26 = 0.037385;
  lambda29 = 43.18028;
  lambda32 = 0.015639;
  lambda35 = 27.584271;
  lambda38 = 0.012478;
  lambda41 = 0.037226;
  lambda44 = 0.015363;
  lambda47 = 0.010418;
  lambda50 = 0.110974;
  lambda53 = 0.023435;
  lambda56 = 0.029949;
  lambda59 = 0.010689;
  lambda62 = 0.510481;
  lambda65 = 0.026065;
  lambda68 = 68.364954;
  lambda71 = 44.812425;
  lambda74 = 0.010493;

  // Reactions:
  eq_1: -> ETGF; g0 - k0*ETGF;
  eq_2: -> SNAIL; g1*(hillfunction(ETGF, T18, lambda20, n19)/lambda20)*hillfunction(SNAIL, T21, lambda23, n22)*hillfunction(MIR34, T51, lambda53, n52)*(hillfunction(TGF, T54, lambda56, n55)/lambda56)*hillfunction(OVOL2, T72, lambda74, n73) - k1*SNAIL;
  eq_3: -> ZEB; g2*(hillfunction(SNAIL, T24, lambda26, n25)/lambda26)*hillfunction(MIR200, T60, lambda62, n61)*hillfunction(OVOL2, T63, lambda65, n64) - k2*ZEB;
  eq_4: -> MIR34; g3*hillfunction(SNAIL, T30, lambda32, n31)*hillfunction(ZEB, T36, lambda38, n37) - k3*MIR34;
  eq_5: -> TGF; g4*hillfunction(MIR200, T57, lambda59, n58)*hillfunction(OVOL2, T66, lambda68, n67) - k4*TGF;
  eq_6: -> MIR200; g5*hillfunction(ZEB, T48, lambda50, n49) - k5*MIR200;
  eq_7: -> OVOL2; g6*hillfunction(ZEB, T45, lambda47, n46) - k6*OVOL2;
  eq_8: -> ECAD; g7*hillfunction(SNAIL, T33, lambda35, n34)*hillfunction(ZEB, T39, lambda41, n40) - k7*ECAD;
  eq_9: -> VIM; g8*(hillfunction(SNAIL, T27, lambda29, n28)/lambda29)*(hillfunction(ZEB, T42, lambda44, n43)/lambda44)*hillfunction(OVOL2, T69, lambda71, n70) - k8*VIM;
end
