// SBML level 2 version 3

function hillfunction(x, ASCL1, lamda, nx)
  lamda + (1 - lamda)*(1/(1 + (x/ASCL1)^nx));
end

model No_2_model_3()

  // Species:
  species ASCL1 = 0.000007;
  species ATF2 = 13.086012;
  species BHLHE40 = 0;
  species CBFA2T2 = 0.003815;
  species CEBPD = 0.766589;
  species ELF3 = 0.694675;
  species ETS2 = 2.320804;
  species FLI1 = 76.973265;
  species FOXA1 = 0.002221;
  species FOXA2 = 0.208026;
  species INSM1 = 211.157669;
  species KDM5B = 0.210652;
  species KLF4 = 0;
  species LEF1 = 0.62694;
  species MITF = 0.000114;
  species MYB = 0.821556;
  species MYC = 0.000049;
  species NEUROD1 = 285.516078;
  species NFKB1 = 0.000009;
  species OVOL2 = 0.039574;
  species PAX5 = 0.415152;
  species PBX1 = 0.109659;
  species POU3F2 = 2.991457;
  species REST = 0;
  species SMAD3 = 0.000268;
  species SOX11 = 44279.15;
  species SOX2 = 0.060437;
  species TCF12 = 1.839104;
  species TCF3 = 46.803143;
  species TCF4 = 8318.881;
  species TCF7L2 = 0.000001;
  species TEAD4 = 0.002808;
  species ZEB1 = 0.138158;

  // Parameters:
  g0 = 2663.938;
  g1 = 817543.5;
  g2 = 445576.3;
  g3 = 97343.81;
  g4 = 90.571724;
  g5 = 7158246;
  g6 = 7.29339e7;
  g7 = 66673.01;
  g8 = 7703337;
  g9 = 1066.327;
  g10 = 88903.85;
  g11 = 612859.9;
  g12 = 321734.3;
  g13 = 671949.3;
  g14 = 561622.3;
  g15 = 841919.4;
  g16 = 8.822475e8;
  g17 = 8088730;
  g18 = 3.190982e8;
  g19 = 702027.3;
  g20 = 11886.25;
  g21 = 6673.416;
  g22 = 60712.14;
  g23 = 34458.64;
  g24 = 776402.4;
  g25 = 5975.329;
  g26 = 64444.03;
  g27 = 790504.8;
  g28 = 1684174;
  g29 = 6020536;
  g30 = 5.826371e7;
  g31 = 42905.62;
  g32 = 2385.165;
  k0 = 0.91584;
  k1 = 0.326538;
  k2 = 0.240481;
  k3 = 0.412757;
  k4 = 0.402296;
  k5 = 0.417283;
  k6 = 0.875094;
  k7 = 0.223631;
  k8 = 0.796477;
  k9 = 0.201809;
  k10 = 0.38647;
  k11 = 0.740577;
  k12 = 0.875739;
  k13 = 0.729381;
  k14 = 0.974698;
  k15 = 0.274949;
  k16 = 0.43932;
  k17 = 0.642047;
  k18 = 0.581157;
  k19 = 0.642318;
  k20 = 0.455992;
  k21 = 0.391528;
  k22 = 0.212641;
  k23 = 0.47849;
  k24 = 0.972294;
  k25 = 0.134454;
  k26 = 0.527984;
  k27 = 0.224093;
  k28 = 0.204913;
  k29 = 0.955095;
  k30 = 0.415328;
  k31 = 0.649582;
  k32 = 0.182888;
  T66 = 0.083621;
  T69 = 1.462105;
  T72 = 0.998848;
  T75 = 1.567315;
  T78 = 0.529519;
  T81 = 3.70333;
  T84 = 4.985179;
  T87 = 5.568014;
  T90 = 0.900482;
  T93 = 0.815578;
  T96 = 0.612112;
  T99 = 1.926584;
  T102 = 1.414662;
  T105 = 0.543639;
  T108 = 0.66902;
  T111 = 1.172437;
  T114 = 3.292509;
  T117 = 0.445641;
  T120 = 2.729657;
  T123 = 0.84198;
  T126 = 0.385029;
  T129 = 1.98392;
  T132 = 0.263648;
  T135 = 2.108982;
  T138 = 1.270532;
  T141 = 1.620446;
  T144 = 5.507557;
  T147 = 3.087363;
  T150 = 2.34;
  T153 = 1.32651;
  T156 = 0.88291;
  T159 = 0.645871;
  T162 = 0.932412;
  T165 = 1.268065;
  T168 = 3.593114;
  T171 = 0.496313;
  T174 = 0.753548;
  T177 = 2.023139;
  T180 = 5.7646;
  T183 = 3.025467;
  T186 = 0.306492;
  T189 = 0.650086;
  T192 = 2.433365;
  T195 = 0.295495;
  T198 = 2.303181;
  T201 = 1.285782;
  T204 = 2.180984;
  T207 = 0.48965;
  T210 = 0.416363;
  T213 = 3.969272;
  T216 = 7.609232;
  T219 = 4.825898;
  T222 = 1.77922;
  T225 = 2.161637;
  T228 = 1.838611;
  T231 = 0.623117;
  T234 = 0.23111;
  T237 = 2.430964;
  T240 = 4.42293;
  T243 = 0.738533;
  T246 = 1.901624;
  T249 = 0.360218;
  T252 = 4.042473;
  T255 = 1.785899;
  T258 = 1.457199;
  T261 = 4.345642;
  T264 = 6.803177;
  T267 = 2.722222;
  T270 = 0.855666;
  T273 = 4.281403;
  T276 = 2.208724;
  T279 = 0.957321;
  T282 = 0.122077;
  T285 = 0.11878;
  T288 = 0.761282;
  T291 = 2.537322;
  T294 = 0.45061;
  T297 = 3.939105;
  T300 = 0.954084;
  T303 = 4.048161;
  T306 = 3.316768;
  T309 = 1.308175;
  T312 = 1.232117;
  T315 = 5.004398;
  T318 = 3.539527;
  T321 = 0.703457;
  T324 = 0.202306;
  T327 = 1.226834;
  T330 = 2.295763;
  T333 = 4.284757;
  T336 = 3.581134;
  T339 = 0.589691;
  T342 = 2.168217;
  T345 = 1.908137;
  T348 = 1.086412;
  T351 = 1.959431;
  T354 = 0.911852;
  T357 = 3.397772;
  T360 = 1.313339;
  T363 = 0.028294;
  T366 = 2.306298;
  T369 = 7.196468;
  T372 = 0.133158;
  T375 = 2.841797;
  T378 = 1.368137;
  T381 = 0.684344;
  T384 = 3.576312;
  T387 = 0.373813;
  T390 = 2.054571;
  T393 = 3.024199;
  T396 = 1.922407;
  T399 = 1.926985;
  T402 = 1.209118;
  T405 = 2.132461;
  T408 = 5.437493;
  T411 = 1.067053;
  T414 = 1.138787;
  T417 = 2.295309;
  T420 = 0.05745;
  T423 = 1.684434;
  T426 = 0.957016;
  T429 = 4.391051;
  T432 = 1.021321;
  T435 = 0.665608;
  T438 = 2.140351;
  T441 = 0.358242;
  T444 = 0.96795;
  T447 = 5.030004;
  T450 = 5.33543;
  T453 = 1.269991;
  T456 = 0.238481;
  T459 = 2.607965;
  T462 = 3.005944;
  T465 = 3.904274;
  T468 = 1.56867;
  T471 = 3.105689;
  T474 = 0.982357;
  T477 = 2.502737;
  T480 = 2.775684;
  T483 = 2.289247;
  T486 = 1.494421;
  T489 = 0.435101;
  T492 = 7.004719;
  T495 = 1.962975;
  T498 = 0.638285;
  T501 = 4.829408;
  T504 = 3.649285;
  T507 = 1.574329;
  T510 = 2.43149;
  T513 = 0.830489;
  T516 = 3.966335;
  T519 = 0.684781;
  T522 = 0.893598;
  T525 = 4.276735;
  T528 = 0.333458;
  T531 = 0.368315;
  T534 = 3.603481;
  T537 = 0.599336;
  T540 = 0.423106;
  T543 = 3.190789;
  T546 = 3.720533;
  T549 = 1.78082;
  T552 = 1.009495;
  T555 = 0.847779;
  T558 = 2.134863;
  T561 = 2.19763;
  T564 = 2.205829;
  T567 = 1.852336;
  T570 = 1.211521;
  T573 = 0.337704;
  T576 = 2.794559;
  T579 = 7.473311;
  T582 = 1.234359;
  T585 = 0.891148;
  T588 = 0.786291;
  T591 = 5.599733;
  T594 = 2.584369;
  T597 = 1.043154;
  T600 = 1.744631;
  T603 = 1.154269;
  T606 = 1.146011;
  T609 = 1.144332;
  T612 = 1.472068;
  T615 = 0.810197;
  T618 = 1.316206;
  T621 = 1.471631;
  T624 = 4.018866;
  T627 = 3.023928;
  T630 = 2.190357;
  T633 = 2.168506;
  T636 = 1.491133;
  T639 = 0.332238;
  T642 = 4.191555;
  T645 = 1.82703;
  T648 = 0.916638;
  T651 = 5.307052;
  T654 = 0.673369;
  T657 = 0.548627;
  T660 = 3.530049;
  T663 = 1.068189;
  T666 = 1.739876;
  T669 = 0.07136;
  T672 = 1.477261;
  T675 = 4.229577;
  T678 = 1.285776;
  T681 = 0.483236;
  T684 = 1.490589;
  T687 = 1.633203;
  T690 = 5.035025;
  T693 = 2.207042;
  T696 = 0.378346;
  T699 = 4.581997;
  T702 = 3.554583;
  T705 = 0.550271;
  T708 = 4.056027;
  T711 = 0.669808;
  T714 = 0.611454;
  T717 = 0.755575;
  T720 = 1.058373;
  T723 = 1.782843;
  T726 = 7.829766;
  T729 = 1.118992;
  T732 = 1.204298;
  T735 = 1.65598;
  T738 = 0.732502;
  T741 = 0.963542;
  T744 = 0.692707;
  T747 = 0.824226;
  T750 = 2.115127;
  T753 = 6.141524;
  T756 = 0.344307;
  T759 = 3.952643;
  T762 = 2.25043;
  T765 = 0.032446;
  T768 = 6.375171;
  T771 = 2.343012;
  T774 = 0.031532;
  T777 = 1.889903;
  T780 = 5.241774;
  T783 = 0.583994;
  T786 = 1.944557;
  T789 = 2.611073;
  T792 = 3.382542;
  T795 = 0.497171;
  T798 = 4.163312;
  T801 = 1.374589;
  T804 = 1.016035;
  T807 = 0.404937;
  T810 = 2.892021;
  T813 = 0.500768;
  T816 = 1.187376;
  T819 = 1.785124;
  T822 = 4.333023;
  T825 = 3.054542;
  T828 = 0.344361;
  T831 = 0.881832;
  T834 = 3.166709;
  T837 = 2.090055;
  T840 = 2.23982;
  T843 = 2.123423;
  T846 = 1.111735;
  T849 = 1.074751;
  T852 = 2.00488;
  T855 = 2.477291;
  T858 = 0.999389;
  T861 = 0.068401;
  T864 = 1.143941;
  T867 = 1.208283;
  T870 = 2.355447;
  T873 = 4.976962;
  T876 = 2.975603;
  T879 = 3.988298;
  T882 = 2.946114;
  T885 = 1.504246;
  T888 = 2.259936;
  T891 = 5.426275;
  T894 = 1.210177;
  T897 = 2.202478;
  T900 = 1.197448;
  T903 = 0.403573;
  T906 = 1.415529;
  T909 = 5.26485;
  T912 = 0.553198;
  T915 = 4.297964;
  T918 = 1.442295;
  T921 = 1.757727;
  T924 = 4.336461;
  T927 = 2.730708;
  T930 = 2.58737;
  T933 = 1.820367;
  T936 = 1.310572;
  T939 = 5.075809;
  T942 = 1.670415;
  T945 = 1.077645;
  T948 = 0.105102;
  T951 = 0.941426;
  T954 = 2.581792;
  T957 = 4.359445;
  T960 = 0.952973;
  T963 = 2.171187;
  T966 = 3.625525;
  T969 = 0.758773;
  T972 = 4.741714;
  T975 = 2.746854;
  T978 = 3.796221;
  T981 = 1.137388;
  T984 = 1.370249;
  T987 = 5.064526;
  T990 = 1.499215;
  T993 = 1.766531;
  T996 = 2.023397;
  T999 = 0.224719;
  T1002 = 1.989796;
  T1005 = 0.978116;
  T1008 = 0.431182;
  T1011 = 3.780153;
  T1014 = 0.784539;
  T1017 = 0.324044;
  T1020 = 1.726228;
  T1023 = 1.082079;
  T1026 = 3.314959;
  T1029 = 0.749269;
  T1032 = 0.892698;
  T1035 = 0.574213;
  T1038 = 0.573564;
  T1041 = 1.642884;
  T1044 = 5.238;
  T1047 = 4.741824;
  T1050 = 0.911631;
  T1053 = 1.764887;
  T1056 = 0.734901;
  T1059 = 1.092605;
  T1062 = 1.187419;
  T1065 = 1.23527;
  T1068 = 2.56247;
  T1071 = 2.255662;
  T1074 = 0.616426;
  T1077 = 0.659596;
  T1080 = 0.759859;
  T1083 = 0.209732;
  T1086 = 1.673647;
  T1089 = 2.455734;
  T1092 = 2.506176;
  T1095 = 0.827733;
  T1098 = 0.340111;
  T1101 = 4.044401;
  T1104 = 0.609162;
  T1107 = 6.074494;
  T1110 = 0.945286;
  T1113 = 6.279201;
  T1116 = 2.142305;
  T1119 = 2.378404;
  T1122 = 7.035506;
  T1125 = 0.766553;
  T1128 = 1.19158;
  T1131 = 0.633251;
  T1134 = 3.246418;
  n67 = 2;
  n70 = 2;
  n73 = 6;
  n76 = 3;
  n79 = 2;
  n82 = 4;
  n85 = 5;
  n88 = 3;
  n91 = 1;
  n94 = 6;
  n97 = 4;
  n100 = 1;
  n103 = 5;
  n106 = 4;
  n109 = 1;
  n112 = 1;
  n115 = 4;
  n118 = 3;
  n121 = 4;
  n124 = 5;
  n127 = 2;
  n130 = 4;
  n133 = 1;
  n136 = 6;
  n139 = 2;
  n142 = 3;
  n145 = 3;
  n148 = 6;
  n151 = 6;
  n154 = 2;
  n157 = 6;
  n160 = 3;
  n163 = 6;
  n166 = 1;
  n169 = 5;
  n172 = 5;
  n175 = 1;
  n178 = 6;
  n181 = 6;
  n184 = 1;
  n187 = 6;
  n190 = 5;
  n193 = 5;
  n196 = 2;
  n199 = 5;
  n202 = 3;
  n205 = 4;
  n208 = 3;
  n211 = 1;
  n214 = 5;
  n217 = 2;
  n220 = 5;
  n223 = 3;
  n226 = 5;
  n229 = 3;
  n232 = 5;
  n235 = 6;
  n238 = 1;
  n241 = 4;
  n244 = 6;
  n247 = 3;
  n250 = 1;
  n253 = 5;
  n256 = 3;
  n259 = 2;
  n262 = 3;
  n265 = 6;
  n268 = 4;
  n271 = 6;
  n274 = 3;
  n277 = 3;
  n280 = 1;
  n283 = 5;
  n286 = 6;
  n289 = 5;
  n292 = 3;
  n295 = 3;
  n298 = 2;
  n301 = 3;
  n304 = 3;
  n307 = 4;
  n310 = 6;
  n313 = 1;
  n316 = 4;
  n319 = 4;
  n322 = 5;
  n325 = 4;
  n328 = 6;
  n331 = 5;
  n334 = 6;
  n337 = 2;
  n340 = 4;
  n343 = 1;
  n346 = 6;
  n349 = 3;
  n352 = 2;
  n355 = 5;
  n358 = 6;
  n361 = 6;
  n364 = 1;
  n367 = 5;
  n370 = 1;
  n373 = 5;
  n376 = 4;
  n379 = 5;
  n382 = 5;
  n385 = 4;
  n388 = 4;
  n391 = 3;
  n394 = 1;
  n397 = 2;
  n400 = 1;
  n403 = 5;
  n406 = 1;
  n409 = 5;
  n412 = 2;
  n415 = 5;
  n418 = 2;
  n421 = 6;
  n424 = 4;
  n427 = 1;
  n430 = 6;
  n433 = 5;
  n436 = 4;
  n439 = 1;
  n442 = 2;
  n445 = 3;
  n448 = 4;
  n451 = 2;
  n454 = 2;
  n457 = 2;
  n460 = 1;
  n463 = 2;
  n466 = 1;
  n469 = 6;
  n472 = 6;
  n475 = 2;
  n478 = 3;
  n481 = 6;
  n484 = 3;
  n487 = 3;
  n490 = 2;
  n493 = 6;
  n496 = 4;
  n499 = 4;
  n502 = 2;
  n505 = 6;
  n508 = 2;
  n511 = 3;
  n514 = 4;
  n517 = 6;
  n520 = 4;
  n523 = 3;
  n526 = 3;
  n529 = 2;
  n532 = 6;
  n535 = 2;
  n538 = 1;
  n541 = 3;
  n544 = 6;
  n547 = 6;
  n550 = 1;
  n553 = 1;
  n556 = 3;
  n559 = 6;
  n562 = 1;
  n565 = 2;
  n568 = 6;
  n571 = 4;
  n574 = 5;
  n577 = 2;
  n580 = 1;
  n583 = 4;
  n586 = 1;
  n589 = 1;
  n592 = 2;
  n595 = 1;
  n598 = 2;
  n601 = 2;
  n604 = 6;
  n607 = 5;
  n610 = 6;
  n613 = 5;
  n616 = 2;
  n619 = 5;
  n622 = 5;
  n625 = 6;
  n628 = 3;
  n631 = 4;
  n634 = 2;
  n637 = 6;
  n640 = 2;
  n643 = 2;
  n646 = 2;
  n649 = 2;
  n652 = 5;
  n655 = 4;
  n658 = 1;
  n661 = 5;
  n664 = 2;
  n667 = 3;
  n670 = 4;
  n673 = 3;
  n676 = 5;
  n679 = 3;
  n682 = 3;
  n685 = 3;
  n688 = 5;
  n691 = 3;
  n694 = 4;
  n697 = 1;
  n700 = 2;
  n703 = 3;
  n706 = 2;
  n709 = 3;
  n712 = 4;
  n715 = 1;
  n718 = 5;
  n721 = 1;
  n724 = 4;
  n727 = 5;
  n730 = 1;
  n733 = 4;
  n736 = 2;
  n739 = 4;
  n742 = 4;
  n745 = 1;
  n748 = 2;
  n751 = 6;
  n754 = 5;
  n757 = 2;
  n760 = 3;
  n763 = 4;
  n766 = 5;
  n769 = 6;
  n772 = 5;
  n775 = 4;
  n778 = 2;
  n781 = 1;
  n784 = 3;
  n787 = 1;
  n790 = 4;
  n793 = 4;
  n796 = 2;
  n799 = 5;
  n802 = 5;
  n805 = 5;
  n808 = 1;
  n811 = 6;
  n814 = 5;
  n817 = 3;
  n820 = 1;
  n823 = 4;
  n826 = 6;
  n829 = 5;
  n832 = 2;
  n835 = 3;
  n838 = 2;
  n841 = 5;
  n844 = 6;
  n847 = 2;
  n850 = 2;
  n853 = 4;
  n856 = 1;
  n859 = 3;
  n862 = 2;
  n865 = 4;
  n868 = 6;
  n871 = 5;
  n874 = 4;
  n877 = 4;
  n880 = 5;
  n883 = 6;
  n886 = 4;
  n889 = 2;
  n892 = 2;
  n895 = 3;
  n898 = 1;
  n901 = 2;
  n904 = 3;
  n907 = 6;
  n910 = 4;
  n913 = 6;
  n916 = 5;
  n919 = 5;
  n922 = 1;
  n925 = 5;
  n928 = 3;
  n931 = 2;
  n934 = 3;
  n937 = 1;
  n940 = 6;
  n943 = 4;
  n946 = 4;
  n949 = 4;
  n952 = 5;
  n955 = 1;
  n958 = 5;
  n961 = 5;
  n964 = 5;
  n967 = 5;
  n970 = 6;
  n973 = 2;
  n976 = 4;
  n979 = 3;
  n982 = 3;
  n985 = 5;
  n988 = 3;
  n991 = 6;
  n994 = 2;
  n997 = 3;
  n1000 = 6;
  n1003 = 3;
  n1006 = 6;
  n1009 = 2;
  n1012 = 1;
  n1015 = 6;
  n1018 = 6;
  n1021 = 5;
  n1024 = 3;
  n1027 = 5;
  n1030 = 4;
  n1033 = 1;
  n1036 = 1;
  n1039 = 2;
  n1042 = 4;
  n1045 = 2;
  n1048 = 2;
  n1051 = 5;
  n1054 = 3;
  n1057 = 5;
  n1060 = 4;
  n1063 = 4;
  n1066 = 3;
  n1069 = 2;
  n1072 = 4;
  n1075 = 2;
  n1078 = 6;
  n1081 = 6;
  n1084 = 3;
  n1087 = 3;
  n1090 = 2;
  n1093 = 5;
  n1096 = 4;
  n1099 = 4;
  n1102 = 2;
  n1105 = 6;
  n1108 = 6;
  n1111 = 2;
  n1114 = 4;
  n1117 = 3;
  n1120 = 5;
  n1123 = 3;
  n1126 = 3;
  n1129 = 2;
  n1132 = 3;
  n1135 = 2;
  lambda68 = 95.658078;
  lambda71 = 24.377603;
  lambda74 = 0.015479;
  lambda77 = 7.629194;
  lambda80 = 0.063078;
  lambda83 = 64.570406;
  lambda86 = 62.96936;
  lambda89 = 48.477424;
  lambda92 = 55.891006;
  lambda95 = 0.037529;
  lambda98 = 0.016297;
  lambda101 = 57.156154;
  lambda104 = 22.13511;
  lambda107 = 0.014179;
  lambda110 = 0.012487;
  lambda113 = 79.307788;
  lambda116 = 54.415561;
  lambda119 = 0.046816;
  lambda122 = 32.684689;
  lambda125 = 89.450474;
  lambda128 = 36.521819;
  lambda131 = 95.864414;
  lambda134 = 36.810896;
  lambda137 = 95.307913;
  lambda140 = 0.010174;
  lambda143 = 46.408117;
  lambda146 = 9.134846;
  lambda149 = 45.646573;
  lambda152 = 92.719832;
  lambda155 = 54.885805;
  lambda158 = 0.021152;
  lambda161 = 0.020083;
  lambda164 = 94.953373;
  lambda167 = 45.423733;
  lambda170 = 35.195161;
  lambda173 = 0.015103;
  lambda176 = 0.056489;
  lambda179 = 48.38105;
  lambda182 = 51.745495;
  lambda185 = 0.027376;
  lambda188 = 6.646971;
  lambda191 = 42.305125;
  lambda194 = 88.501527;
  lambda197 = 3.318438;
  lambda200 = 0.016736;
  lambda203 = 46.558724;
  lambda206 = 48.877786;
  lambda209 = 0.02011;
  lambda212 = 0.301347;
  lambda215 = 0.016736;
  lambda218 = 0.020459;
  lambda221 = 0.02011;
  lambda224 = 0.063712;
  lambda227 = 0.030288;
  lambda230 = 0.017475;
  lambda233 = 0.011269;
  lambda236 = 88.220106;
  lambda239 = 22.447545;
  lambda242 = 30.021111;
  lambda245 = 0.027832;
  lambda248 = 11.409888;
  lambda251 = 28.19565;
  lambda254 = 0.017475;
  lambda257 = 88.737393;
  lambda260 = 0.011335;
  lambda263 = 61.154077;
  lambda266 = 35.929566;
  lambda269 = 0.01449;
  lambda272 = 0.117254;
  lambda275 = 0.021296;
  lambda278 = 0.039779;
  lambda281 = 59.273186;
  lambda284 = 19.140922;
  lambda287 = 61.462872;
  lambda290 = 43.496563;
  lambda293 = 0.024926;
  lambda296 = 56.549106;
  lambda299 = 93.772474;
  lambda302 = 79.920282;
  lambda305 = 0.01272;
  lambda308 = 5.162628;
  lambda311 = 0.091822;
  lambda314 = 36.989798;
  lambda317 = 80.929569;
  lambda320 = 91.775536;
  lambda323 = 27.872419;
  lambda326 = 0.019966;
  lambda329 = 24.287426;
  lambda332 = 0.057229;
  lambda335 = 62.175992;
  lambda338 = 18.278041;
  lambda341 = 31.682431;
  lambda344 = 33.695992;
  lambda347 = 5.498085;
  lambda350 = 31.039386;
  lambda353 = 0.017654;
  lambda356 = 64.978073;
  lambda359 = 23.729215;
  lambda362 = 0.334717;
  lambda365 = 0.010141;
  lambda368 = 0.027077;
  lambda371 = 10.415125;
  lambda374 = 44.085729;
  lambda377 = 0.25531;
  lambda380 = 43.205949;
  lambda383 = 5.99211;
  lambda386 = 8.112255;
  lambda389 = 47.690214;
  lambda392 = 0.035071;
  lambda395 = 0.024678;
  lambda398 = 0.06129;
  lambda401 = 53.391862;
  lambda404 = 0.014881;
  lambda407 = 93.896772;
  lambda410 = 62.902154;
  lambda413 = 4.13005;
  lambda416 = 0.017476;
  lambda419 = 73.749195;
  lambda422 = 22.000465;
  lambda425 = 72.253985;
  lambda428 = 0.016363;
  lambda431 = 62.265766;
  lambda434 = 23.406193;
  lambda437 = 60.879409;
  lambda440 = 11.835783;
  lambda443 = 43.971403;
  lambda446 = 75.965258;
  lambda449 = 0.010894;
  lambda452 = 93.688443;
  lambda455 = 0.027817;
  lambda458 = 72.474919;
  lambda461 = 0.011748;
  lambda464 = 43.776455;
  lambda467 = 84.134932;
  lambda470 = 78.917875;
  lambda473 = 0.195715;
  lambda476 = 4.644278;
  lambda479 = 1.506509;
  lambda482 = 58.673212;
  lambda485 = 27.681114;
  lambda488 = 0.068241;
  lambda491 = 0.039063;
  lambda494 = 88.966607;
  lambda497 = 0.670753;
  lambda500 = 78.610164;
  lambda503 = 65.015188;
  lambda506 = 6.880256;
  lambda509 = 0.052256;
  lambda512 = 0.179794;
  lambda515 = 86.003442;
  lambda518 = 71.549593;
  lambda521 = 0.011489;
  lambda524 = 0.012222;
  lambda527 = 0.022364;
  lambda530 = 0.148736;
  lambda533 = 0.010974;
  lambda536 = 0.020612;
  lambda539 = 0.019025;
  lambda542 = 0.011645;
  lambda545 = 44.777747;
  lambda548 = 0.01657;
  lambda551 = 0.018629;
  lambda554 = 6.82125;
  lambda557 = 0.011927;
  lambda560 = 80.458414;
  lambda563 = 0.017585;
  lambda566 = 73.471407;
  lambda569 = 85.623516;
  lambda572 = 90.487663;
  lambda575 = 0.015173;
  lambda578 = 0.039249;
  lambda581 = 0.015129;
  lambda584 = 66.097522;
  lambda587 = 0.022873;
  lambda590 = 30.764148;
  lambda593 = 0.01431;
  lambda596 = 4.084856;
  lambda599 = 0.028051;
  lambda602 = 52.818987;
  lambda605 = 1.927917;
  lambda608 = 0.010842;
  lambda611 = 0.010842;
  lambda614 = 0.038743;
  lambda617 = 0.018186;
  lambda620 = 0.085519;
  lambda623 = 0.02485;
  lambda626 = 0.119679;
  lambda629 = 23.876358;
  lambda632 = 0.026335;
  lambda635 = 0.013517;
  lambda638 = 93.306018;
  lambda641 = 93.306018;
  lambda644 = 0.22782;
  lambda647 = 0.014657;
  lambda650 = 68.228469;
  lambda653 = 29.586132;
  lambda656 = 0.010609;
  lambda659 = 0.01577;
  lambda662 = 0.01577;
  lambda665 = 92.444951;
  lambda668 = 7.583839;
  lambda671 = 0.131859;
  lambda674 = 23.110311;
  lambda677 = 0.010797;
  lambda680 = 0.010897;
  lambda683 = 57.821058;
  lambda686 = 21.589484;
  lambda689 = 0.092235;
  lambda692 = 19.948307;
  lambda695 = 19.948307;
  lambda698 = 0.040525;
  lambda701 = 0.010572;
  lambda704 = 8.022751;
  lambda707 = 0.073905;
  lambda710 = 26.8512;
  lambda713 = 0.015924;
  lambda716 = 19.269264;
  lambda719 = 0.01282;
  lambda722 = 53.263414;
  lambda725 = 95.703269;
  lambda728 = 0.010449;
  lambda731 = 0.074871;
  lambda734 = 18.198122;
  lambda737 = 88.170412;
  lambda740 = 0.054951;
  lambda743 = 88.170412;
  lambda746 = 0.011308;
  lambda749 = 47.358436;
  lambda752 = 0.03354;
  lambda755 = 62.990047;
  lambda758 = 62.990047;
  lambda761 = 79.498467;
  lambda764 = 80.718804;
  lambda767 = 62.753558;
  lambda770 = 0.026623;
  lambda773 = 0.011237;
  lambda776 = 43.458323;
  lambda779 = 0.120466;
  lambda782 = 54.153364;
  lambda785 = 38.439575;
  lambda788 = 0.015055;
  lambda791 = 35.040156;
  lambda794 = 97.823898;
  lambda797 = 31.342956;
  lambda800 = 37.508163;
  lambda803 = 97.823898;
  lambda806 = 0.031905;
  lambda809 = 0.026661;
  lambda812 = 61.763809;
  lambda815 = 39.896347;
  lambda818 = 0.029117;
  lambda821 = 34.344025;
  lambda824 = 30.875847;
  lambda827 = 0.029302;
  lambda830 = 83.894443;
  lambda833 = 98.031858;
  lambda836 = 98.031858;
  lambda839 = 0.04031;
  lambda842 = 40.430583;
  lambda845 = 89.147472;
  lambda848 = 20.377408;
  lambda851 = 1.847703;
  lambda854 = 0.012891;
  lambda857 = 0.010423;
  lambda860 = 0.087449;
  lambda863 = 13.954224;
  lambda866 = 2.057761;
  lambda869 = 9.255008;
  lambda872 = 0.016402;
  lambda875 = 0.060359;
  lambda878 = 0.017466;
  lambda881 = 74.105367;
  lambda884 = 87.648745;
  lambda887 = 28.428676;
  lambda890 = 58.713971;
  lambda893 = 0.012158;
  lambda896 = 64.011883;
  lambda899 = 0.019383;
  lambda902 = 0.015208;
  lambda905 = 0.028737;
  lambda908 = 0.011435;
  lambda911 = 74.021999;
  lambda914 = 0.010799;
  lambda917 = 0.025054;
  lambda920 = 64.833215;
  lambda923 = 0.012934;
  lambda926 = 8.407285;
  lambda929 = 3.892667;
  lambda932 = 3.892667;
  lambda935 = 44.839417;
  lambda938 = 77.640278;
  lambda941 = 59.054055;
  lambda944 = 59.054055;
  lambda947 = 81.424472;
  lambda950 = 0.088273;
  lambda953 = 0.02842;
  lambda956 = 0.02842;
  lambda959 = 90.467978;
  lambda962 = 1.42611;
  lambda965 = 46.403425;
  lambda968 = 0.042688;
  lambda971 = 0.012595;
  lambda974 = 0.017772;
  lambda977 = 0.016025;
  lambda980 = 0.019501;
  lambda983 = 7.473903;
  lambda986 = 0.026378;
  lambda989 = 0.044477;
  lambda992 = 96.868812;
  lambda995 = 55.881964;
  lambda998 = 0.017895;
  lambda1001 = 0.015736;
  lambda1004 = 86.833232;
  lambda1007 = 0.020619;
  lambda1010 = 5.86976;
  lambda1013 = 83.749089;
  lambda1016 = 0.048557;
  lambda1019 = 26.423524;
  lambda1022 = 0.072414;
  lambda1025 = 0.058009;
  lambda1028 = 0.016152;
  lambda1031 = 0.278816;
  lambda1034 = 0.013862;
  lambda1037 = 0.028186;
  lambda1040 = 0.047363;
  lambda1043 = 0.027035;
  lambda1046 = 0.012952;
  lambda1049 = 0.012952;
  lambda1052 = 86.89553;
  lambda1055 = 0.021845;
  lambda1058 = 0.039788;
  lambda1061 = 55.92504;
  lambda1064 = 45.777905;
  lambda1067 = 0.039788;
  lambda1070 = 55.487464;
  lambda1073 = 0.057557;
  lambda1076 = 51.660853;
  lambda1079 = 67.243638;
  lambda1082 = 72.775338;
  lambda1085 = 0.014635;
  lambda1088 = 51.671437;
  lambda1091 = 0.015655;
  lambda1094 = 63.40431;
  lambda1097 = 0.032645;
  lambda1100 = 20.122248;
  lambda1103 = 0.015195;
  lambda1106 = 0.049696;
  lambda1109 = 68.782016;
  lambda1112 = 0.0448;
  lambda1115 = 0.0448;
  lambda1118 = 0.041145;
  lambda1121 = 78.342129;
  lambda1124 = 27.69729;
  lambda1127 = 0.020099;
  lambda1130 = 0.016654;
  lambda1133 = 26.89003;
  lambda1136 = 59.758174;

  // Reactions:
  eq_1: -> ASCL1; g0*(hillfunction(KLF4, T117, lambda119, n118)/lambda119)*(hillfunction(PBX1, T423, lambda425, n424)/lambda425)*hillfunction(MITF, T546, lambda548, n547)*(hillfunction(LEF1, T618, lambda620, n619)/lambda620)*hillfunction(REST, T903, lambda905, n904)*(hillfunction(KDM5B, T1029, lambda1031, n1030)/lambda1031)*(hillfunction(POU3F2, T1083, lambda1085, n1084)/lambda1085)*(hillfunction(SOX2, T1098, lambda1100, n1099)/lambda1100) - k0*ASCL1;
  eq_2: -> ATF2; g1*(hillfunction(FOXA2, T288, lambda290, n289)/lambda290)*hillfunction(KLF4, T297, lambda299, n298)*hillfunction(MYC, T369, lambda371, n370)*(hillfunction(KDM5B, T393, lambda395, n394)/lambda395)*(hillfunction(POU3F2, T417, lambda419, n418)/lambda419)*hillfunction(TEAD4, T483, lambda485, n484)*hillfunction(MITF, T543, lambda545, n544)*(hillfunction(MYB, T735, lambda737, n736)/lambda737)*(hillfunction(TCF7L2, T813, lambda815, n814)/lambda815)*hillfunction(REST, T891, lambda893, n892)*(hillfunction(FOXA1, T918, lambda920, n919)/lambda920)*(hillfunction(TCF12, T1080, lambda1082, n1081)/lambda1082) - k1*ATF2;
  eq_3: -> BHLHE40; g2*(hillfunction(SMAD3, T183, lambda185, n184)/lambda185)*(hillfunction(CEBPD, T396, lambda398, n397)/lambda398)*(hillfunction(MITF, T555, lambda557, n556)/lambda557)*(hillfunction(TEAD4, T576, lambda578, n577)/lambda578)*hillfunction(LEF1, T633, lambda635, n634)*(hillfunction(NFKB1, T669, lambda671, n670)/lambda671)*(hillfunction(KLF4, T750, lambda752, n751)/lambda752)*(hillfunction(MYC, T765, lambda767, n766)/lambda767)*(hillfunction(TCF7L2, T816, lambda818, n817)/lambda818)*(hillfunction(REST, T882, lambda884, n883)/lambda884)*hillfunction(PAX5, T924, lambda926, n925)*hillfunction(TCF12, T963, lambda965, n964) - k2*BHLHE40;
  eq_4: -> CBFA2T2; g3*(hillfunction(FOXA2, T285, lambda287, n286)/lambda287)*(hillfunction(KDM5B, T390, lambda392, n391)/lambda392)*(hillfunction(TCF4, T522, lambda524, n523)/lambda524)*hillfunction(MITF, T540, lambda542, n541)*hillfunction(TEAD4, T582, lambda584, n583)*(hillfunction(FOXA1, T747, lambda749, n748)/lambda749)*(hillfunction(CEBPD, T759, lambda761, n760)/lambda761)*hillfunction(MYC, T1008, lambda1010, n1009)*(hillfunction(FLI1, T1056, lambda1058, n1057)/lambda1058)*(hillfunction(OVOL2, T1095, lambda1097, n1096)/lambda1097) - k3*CBFA2T2;
  eq_5: -> CEBPD; g4*(hillfunction(SOX2, T153, lambda155, n154)/lambda155)*(hillfunction(NFKB1, T786, lambda788, n787)/lambda788)*hillfunction(MYC, T1005, lambda1007, n1006) - k4*CEBPD;
  eq_6: -> ELF3; g5*(hillfunction(SOX2, T195, lambda197, n196)/lambda197)*(hillfunction(KLF4, T291, lambda293, n292)/lambda293)*hillfunction(MYC, T351, lambda353, n352)*hillfunction(MITF, T525, lambda527, n526)*hillfunction(TCF4, T588, lambda590, n589)*hillfunction(NFKB1, T663, lambda665, n664)*hillfunction(TCF3, T777, lambda779, n778)*hillfunction(TEAD4, T843, lambda845, n844)*hillfunction(TCF7L2, T861, lambda863, n862)*hillfunction(REST, T906, lambda908, n907)*hillfunction(KDM5B, T933, lambda935, n934)*(hillfunction(TCF12, T957, lambda959, n958)/lambda959)*(hillfunction(CEBPD, T993, lambda995, n994)/lambda995) - k5*ELF3;
  eq_7: -> ETS2; g6*(hillfunction(KLF4, T78, lambda80, n79)/lambda80)*hillfunction(SMAD3, T180, lambda182, n181)*(hillfunction(SOX2, T198, lambda200, n199)/lambda200)*(hillfunction(FOXA2, T267, lambda269, n268)/lambda269)*hillfunction(MYC, T300, lambda302, n301)*(hillfunction(FLI1, T450, lambda452, n451)/lambda452)*hillfunction(TEAD4, T468, lambda470, n469)*(hillfunction(TCF4, T501, lambda503, n502)/lambda503)*(hillfunction(NFKB1, T666, lambda668, n667)/lambda668)*hillfunction(TCF7L2, T864, lambda866, n865)*hillfunction(REST, T876, lambda878, n877)*hillfunction(KDM5B, T936, lambda938, n937)*hillfunction(BHLHE40, T1035, lambda1037, n1036)*(hillfunction(ASCL1, T1104, lambda1106, n1105)/lambda1106)*(hillfunction(CBFA2T2, T1113, lambda1115, n1114)/lambda1115) - k6*ETS2;
  eq_8: -> FLI1; g7*(hillfunction(SOX2, T99, lambda101, n100)/lambda101)*(hillfunction(TCF3, T141, lambda143, n142)/lambda143)*hillfunction(MYC, T213, lambda215, n214)*(hillfunction(FOXA2, T261, lambda263, n262)/lambda263)*(hillfunction(TCF4, T606, lambda608, n607)/lambda608)*(hillfunction(LEF1, T621, lambda623, n622)/lambda623)*hillfunction(NFKB1, T657, lambda659, n658)*(hillfunction(ETS2, T711, lambda713, n712)/lambda713)*hillfunction(BHLHE40, T975, lambda977, n976)*(hillfunction(ATF2, T1071, lambda1073, n1072)/lambda1073) - k7*FLI1;
  eq_9: -> FOXA1; g8*(hillfunction(KLF4, T72, lambda74, n73)/lambda74)*(hillfunction(SOX2, T201, lambda203, n202)/lambda203)*(hillfunction(TCF3, T243, lambda245, n244)/lambda245)*hillfunction(SMAD3, T249, lambda251, n250)*(hillfunction(FOXA2, T270, lambda272, n271)/lambda272)*hillfunction(MYC, T354, lambda356, n355)*(hillfunction(KDM5B, T375, lambda377, n376)/lambda377)*(hillfunction(POU3F2, T405, lambda407, n406)/lambda407)*(hillfunction(PBX1, T426, lambda428, n427)/lambda428)*(hillfunction(TCF4, T591, lambda593, n592)/lambda593)*(hillfunction(LEF1, T624, lambda626, n625)/lambda626)*(hillfunction(ATF2, T642, lambda644, n643)/lambda644)*hillfunction(TCF7L2, T837, lambda839, n838)*(hillfunction(TCF12, T858, lambda860, n859)/lambda860) - k8*FOXA1;
  eq_10: -> FOXA2; g9*(hillfunction(SOX2, T102, lambda104, n103)/lambda104)*hillfunction(TCF3, T123, lambda125, n124)*hillfunction(SMAD3, T174, lambda176, n175)*hillfunction(REST, T321, lambda323, n322)*(hillfunction(KDM5B, T372, lambda374, n373)/lambda374)*(hillfunction(FLI1, T447, lambda449, n448)/lambda449)*hillfunction(NFKB1, T660, lambda662, n661)*(hillfunction(FOXA1, T969, lambda971, n970)/lambda971) - k9*FOXA2;
  eq_11: -> INSM1; g10*(hillfunction(KLF4, T66, lambda68, n67)/lambda68)*(hillfunction(SOX2, T96, lambda98, n97)/lambda98)*(hillfunction(TCF3, T120, lambda122, n121)/lambda122)*hillfunction(REST, T318, lambda320, n319)*hillfunction(MYC, T420, lambda422, n421)*hillfunction(TEAD4, T567, lambda569, n568)*(hillfunction(LEF1, T687, lambda689, n688)/lambda689)*hillfunction(TCF7L2, T798, lambda800, n799)*(hillfunction(PAX5, T921, lambda923, n922)/lambda923)*(hillfunction(NEUROD1, T1125, lambda1127, n1126)/lambda1127) - k10*INSM1;
  eq_12: -> KDM5B; g11*(hillfunction(FLI1, T462, lambda464, n463)/lambda464)*hillfunction(MITF, T561, lambda563, n562)*(hillfunction(LEF1, T705, lambda707, n706)/lambda707)*(hillfunction(FOXA2, T768, lambda770, n769)/lambda770)*(hillfunction(MYC, T954, lambda956, n955)/lambda956)*hillfunction(BHLHE40, T990, lambda992, n991)*(hillfunction(CEBPD, T996, lambda998, n997)/lambda998)*(hillfunction(REST, T1017, lambda1019, n1018)/lambda1019)*(hillfunction(ATF2, T1026, lambda1028, n1027)/lambda1028)*(hillfunction(MYB, T1044, lambda1046, n1045)/lambda1046)*(hillfunction(TCF12, T1050, lambda1052, n1051)/lambda1052) - k11*KDM5B;
  eq_13: -> KLF4; g12*(hillfunction(SMAD3, T192, lambda194, n193)/lambda194)*hillfunction(MYC, T366, lambda368, n367)*(hillfunction(CEBPD, T402, lambda404, n403)/lambda404)*hillfunction(SOX11, T444, lambda446, n445)*(hillfunction(MITF, T564, lambda566, n565)/lambda566)*hillfunction(TEAD4, T585, lambda587, n586)*(hillfunction(LEF1, T636, lambda638, n637)/lambda638)*(hillfunction(NFKB1, T684, lambda686, n685)/lambda686)*(hillfunction(TCF7L2, T825, lambda827, n826)/lambda827)*hillfunction(KDM5B, T945, lambda947, n946)*(hillfunction(BHLHE40, T1038, lambda1040, n1039)/lambda1040) - k12*KLF4;
  eq_14: -> LEF1; g13*(hillfunction(KLF4, T75, lambda77, n76)/lambda77)*(hillfunction(TCF3, T132, lambda134, n133)/lambda134)*(hillfunction(SOX2, T159, lambda161, n160)/lambda161)*hillfunction(MYC, T222, lambda224, n223)*hillfunction(TCF7L2, T342, lambda344, n343)*(hillfunction(KDM5B, T381, lambda383, n382)/lambda383)*hillfunction(REST, T465, lambda467, n466)*(hillfunction(MITF, T531, lambda533, n532)/lambda533)*(hillfunction(TCF4, T597, lambda599, n598)/lambda599)*(hillfunction(ETS2, T720, lambda722, n721)/lambda722)*hillfunction(BHLHE40, T984, lambda986, n985) - k13*LEF1;
  eq_15: -> MITF; g14*hillfunction(MYB, T228, lambda230, n229)*(hillfunction(SMAD3, T252, lambda254, n253)/lambda254)*(hillfunction(MYC, T306, lambda308, n307)/lambda308)*hillfunction(POU3F2, T408, lambda410, n409)*hillfunction(PBX1, T432, lambda434, n433)*hillfunction(TCF4, T504, lambda506, n505)*hillfunction(ATF2, T645, lambda647, n646)*hillfunction(LEF1, T693, lambda695, n694)*hillfunction(ETS2, T714, lambda716, n715)*hillfunction(FOXA2, T828, lambda830, n829)*hillfunction(FOXA1, T972, lambda974, n973) - k14*MITF;
  eq_16: -> MYB; g15*(hillfunction(KLF4, T87, lambda89, n88)/lambda89)*hillfunction(SOX2, T207, lambda209, n208)*hillfunction(MYC, T363, lambda365, n364)*(hillfunction(FLI1, T459, lambda461, n460)/lambda461)*hillfunction(TEAD4, T477, lambda479, n478)*(hillfunction(TCF4, T513, lambda515, n514)/lambda515)*hillfunction(NFKB1, T675, lambda677, n676)*(hillfunction(LEF1, T702, lambda704, n703)/lambda704)*(hillfunction(FOXA1, T741, lambda743, n742)/lambda743)*(hillfunction(FOXA2, T831, lambda833, n832)/lambda833)*hillfunction(TCF7L2, T870, lambda872, n871) - k15*MYB;
  eq_17: -> MYC; g16*hillfunction(KLF4, T90, lambda92, n91)*hillfunction(TCF3, T150, lambda152, n151)*(hillfunction(SOX2, T171, lambda173, n172)/lambda173)*hillfunction(MYB, T240, lambda242, n241)*(hillfunction(SMAD3, T258, lambda260, n259)/lambda260)*hillfunction(TCF4, T612, lambda614, n613)*(hillfunction(TCF7L2, T819, lambda821, n820)/lambda821)*hillfunction(FOXA2, T834, lambda836, n835)*(hillfunction(TEAD4, T852, lambda854, n853)/lambda854)*(hillfunction(REST, T897, lambda899, n898)/lambda899)*hillfunction(TCF12, T966, lambda968, n967)*hillfunction(ATF2, T1020, lambda1022, n1021)*hillfunction(CEBPD, T1047, lambda1049, n1048)*hillfunction(FLI1, T1053, lambda1055, n1054)*hillfunction(OVOL2, T1089, lambda1091, n1090)*hillfunction(ASCL1, T1101, lambda1103, n1102) - k16*MYC;
  eq_18: -> NEUROD1; g17*hillfunction(KLF4, T81, lambda83, n82)*(hillfunction(TCF3, T144, lambda146, n145)/lambda146)*hillfunction(SOX2, T165, lambda167, n166)*hillfunction(REST, T330, lambda332, n331)*(hillfunction(SOX11, T441, lambda443, n442)/lambda443)*(hillfunction(TCF4, T609, lambda611, n610)/lambda611)*hillfunction(LEF1, T699, lambda701, n700)*hillfunction(FOXA1, T780, lambda782, n781)*(hillfunction(TEAD4, T1077, lambda1079, n1078)/lambda1079)*(hillfunction(POU3F2, T1086, lambda1088, n1087)/lambda1088)*hillfunction(ASCL1, T1107, lambda1109, n1108)*hillfunction(INSM1, T1131, lambda1133, n1132) - k17*NEUROD1;
  eq_19: -> NFKB1; g18*hillfunction(MYB, T231, lambda233, n232)*(hillfunction(SMAD3, T255, lambda257, n256)/lambda257)*(hillfunction(REST, T336, lambda338, n337)/lambda338)*hillfunction(FLI1, T453, lambda455, n454)*(hillfunction(MITF, T534, lambda536, n535)/lambda536)*hillfunction(TCF4, T603, lambda605, n604)*hillfunction(FOXA1, T738, lambda740, n739)*(hillfunction(CEBPD, T756, lambda758, n757)/lambda758)*(hillfunction(TCF7L2, T807, lambda809, n808)/lambda809)*hillfunction(KDM5B, T939, lambda941, n940)*(hillfunction(MYC, T951, lambda953, n952)/lambda953)*(hillfunction(BHLHE40, T987, lambda989, n988)/lambda989)*hillfunction(TCF12, T1011, lambda1013, n1012)*hillfunction(PAX5, T1059, lambda1061, n1060)*(hillfunction(ZEB1, T1062, lambda1064, n1063)/lambda1064)*hillfunction(ATF2, T1074, lambda1076, n1075) - k18*NFKB1;
  eq_20: -> OVOL2; g19*(hillfunction(SOX2, T162, lambda164, n163)/lambda164)*hillfunction(SMAD3, T177, lambda179, n178)*(hillfunction(FOXA2, T264, lambda266, n265)/lambda266)*hillfunction(MITF, T549, lambda551, n550)*(hillfunction(ATF2, T639, lambda641, n640)/lambda641)*(hillfunction(ELF3, T771, lambda773, n772)/lambda773)*hillfunction(NFKB1, T783, lambda785, n784)*hillfunction(TEAD4, T840, lambda842, n841)*(hillfunction(TCF12, T855, lambda857, n856)/lambda857)*(hillfunction(FOXA1, T912, lambda914, n913)/lambda914)*hillfunction(MYC, T948, lambda950, n949)*(hillfunction(CBFA2T2, T1116, lambda1118, n1117)/lambda1118) - k19*OVOL2;
  eq_21: -> PAX5; g20*hillfunction(MYC, T219, lambda221, n220)*(hillfunction(FOXA2, T276, lambda278, n277)/lambda278)*hillfunction(REST, T327, lambda329, n328)*(hillfunction(KDM5B, T378, lambda380, n379)/lambda380)*(hillfunction(SOX11, T438, lambda440, n439)/lambda440)*(hillfunction(SOX2, T489, lambda491, n490)/lambda491)*(hillfunction(TCF4, T507, lambda509, n508)/lambda509)*(hillfunction(ATF2, T648, lambda650, n649)/lambda650)*hillfunction(NFKB1, T792, lambda794, n793) - k20*PAX5;
  eq_22: -> PBX1; g21*hillfunction(TCF7L2, T345, lambda347, n346)*(hillfunction(FLI1, T456, lambda458, n457)/lambda458)*hillfunction(TEAD4, T471, lambda473, n472)*(hillfunction(SOX2, T492, lambda494, n493)/lambda494)*(hillfunction(MYB, T729, lambda731, n730)/lambda731)*hillfunction(REST, T894, lambda896, n895)*(hillfunction(KDM5B, T942, lambda944, n943)/lambda944)*(hillfunction(KLF4, T1119, lambda1121, n1120)/lambda1121) - k21*PBX1;
  eq_23: -> POU3F2; g22*(hillfunction(KLF4, T84, lambda86, n85)/lambda86)*(hillfunction(SOX2, T210, lambda212, n211)/lambda212)*(hillfunction(TCF3, T246, lambda248, n247)/lambda248)*hillfunction(MYC, T312, lambda314, n313)*hillfunction(REST, T333, lambda335, n334)*(hillfunction(KDM5B, T384, lambda386, n385)/lambda386)*(hillfunction(LEF1, T630, lambda632, n631)/lambda632)*hillfunction(TCF7L2, T867, lambda869, n868)*(hillfunction(SOX11, T1110, lambda1112, n1111)/lambda1112) - k22*POU3F2;
  eq_24: -> REST; g23*(hillfunction(SOX2, T108, lambda110, n109)/lambda110)*hillfunction(TCF3, T135, lambda137, n136)*(hillfunction(KLF4, T294, lambda296, n295)/lambda296)*(hillfunction(MYC, T357, lambda359, n358)/lambda359)*(hillfunction(KDM5B, T387, lambda389, n388)/lambda389)*hillfunction(TCF4, T510, lambda512, n511)*(hillfunction(NFKB1, T672, lambda674, n673)/lambda674)*(hillfunction(TCF7L2, T810, lambda812, n811)/lambda812)*(hillfunction(TEAD4, T849, lambda851, n850)/lambda851)*(hillfunction(BHLHE40, T978, lambda980, n979)/lambda980) - k23*REST;
  eq_25: -> SMAD3; g24*hillfunction(SOX2, T105, lambda107, n106)*hillfunction(MYC, T216, lambda218, n217)*hillfunction(FOXA2, T273, lambda275, n274)*(hillfunction(REST, T324, lambda326, n325)/lambda326)*(hillfunction(KLF4, T495, lambda497, n496)/lambda497)*(hillfunction(MITF, T528, lambda530, n529)/lambda530)*hillfunction(TCF4, T600, lambda602, n601)*hillfunction(LEF1, T696, lambda698, n697)*hillfunction(MYB, T726, lambda728, n727)*(hillfunction(CEBPD, T753, lambda755, n754)/lambda755)*(hillfunction(TCF7L2, T804, lambda806, n805)/lambda806)*(hillfunction(TEAD4, T846, lambda848, n847)/lambda848) - k24*SMAD3;
  eq_26: -> SOX11; g25*(hillfunction(TCF3, T126, lambda128, n127)/lambda128)*hillfunction(SOX2, T156, lambda158, n157)*(hillfunction(TCF4, T486, lambda488, n487)/lambda488)*hillfunction(TEAD4, T570, lambda572, n571)*hillfunction(MYC, T762, lambda764, n763)*hillfunction(SMAD3, T795, lambda797, n796)*hillfunction(TCF7L2, T801, lambda803, n802) - k25*SOX11;
  eq_27: -> SOX2; g26*(hillfunction(KLF4, T69, lambda71, n70)/lambda71)*hillfunction(TCF3, T129, lambda131, n130)*hillfunction(MYC, T309, lambda311, n310)*(hillfunction(POU3F2, T411, lambda413, n412)/lambda413)*hillfunction(TEAD4, T573, lambda575, n574)*(hillfunction(TCF4, T594, lambda596, n595)/lambda596)*(hillfunction(LEF1, T690, lambda692, n691)/lambda692)*(hillfunction(ETS2, T717, lambda719, n718)/lambda719)*(hillfunction(REST, T909, lambda911, n910)/lambda911) - k26*SOX2;
  eq_28: -> TCF12; g27*(hillfunction(FOXA2, T282, lambda284, n283)/lambda284)*(hillfunction(POU3F2, T414, lambda416, n415)/lambda416)*(hillfunction(TCF4, T615, lambda617, n616)/lambda617)*(hillfunction(MYB, T732, lambda734, n733)/lambda734)*hillfunction(TCF7L2, T873, lambda875, n874)*hillfunction(REST, T888, lambda890, n889)*hillfunction(TEAD4, T900, lambda902, n901)*(hillfunction(PAX5, T930, lambda932, n931)/lambda932)*(hillfunction(ATF2, T1023, lambda1025, n1024)/lambda1025)*(hillfunction(KDM5B, T1032, lambda1034, n1033)/lambda1034)*hillfunction(MYC, T1041, lambda1043, n1042)*hillfunction(BHLHE40, T1068, lambda1070, n1069) - k27*TCF12;
  eq_29: -> TCF3; g28*hillfunction(KLF4, T93, lambda95, n94)*hillfunction(SOX2, T114, lambda116, n115)*hillfunction(MYC, T225, lambda227, n226)*(hillfunction(TCF4, T519, lambda521, n520)/lambda521)*hillfunction(TEAD4, T579, lambda581, n580)*hillfunction(NFKB1, T681, lambda683, n682)*(hillfunction(LEF1, T708, lambda710, n709)/lambda710)*(hillfunction(FOXA1, T744, lambda746, n745)/lambda746)*hillfunction(TCF7L2, T822, lambda824, n823)*hillfunction(REST, T885, lambda887, n886)*(hillfunction(PAX5, T927, lambda929, n928)/lambda929)*hillfunction(BHLHE40, T981, lambda983, n982) - k28*TCF3;
  eq_30: -> TCF4; g29*(hillfunction(TCF3, T147, lambda149, n148)/lambda149)*(hillfunction(SOX2, T168, lambda170, n169)/lambda170)*hillfunction(SMAD3, T186, lambda188, n187)*(hillfunction(MYB, T234, lambda236, n235)/lambda236)*hillfunction(REST, T339, lambda341, n340)*hillfunction(TCF7L2, T348, lambda350, n349)*hillfunction(MYC, T360, lambda362, n361)*hillfunction(TEAD4, T474, lambda476, n475)*hillfunction(KLF4, T498, lambda500, n499)*hillfunction(MITF, T558, lambda560, n559)*hillfunction(ATF2, T651, lambda653, n652)*hillfunction(LEF1, T1128, lambda1130, n1129) - k29*TCF4;
  eq_31: -> TCF7L2; g30*hillfunction(SOX2, T111, lambda113, n112)*hillfunction(TCF3, T138, lambda140, n139)*(hillfunction(SMAD3, T189, lambda191, n190)/lambda191)*hillfunction(MYB, T237, lambda239, n238)*hillfunction(FOXA2, T279, lambda281, n280)*(hillfunction(MYC, T315, lambda317, n316)/lambda317)*(hillfunction(CEBPD, T399, lambda401, n400)/lambda401)*hillfunction(PBX1, T435, lambda437, n436)*(hillfunction(TEAD4, T480, lambda482, n481)/lambda482)*hillfunction(TCF4, T516, lambda518, n517)*(hillfunction(MITF, T537, lambda539, n538)/lambda539)*(hillfunction(ATF2, T654, lambda656, n655)/lambda656)*(hillfunction(NFKB1, T678, lambda680, n679)/lambda680)*hillfunction(FOXA1, T915, lambda917, n916)*(hillfunction(BHLHE40, T1065, lambda1067, n1066)/lambda1067) - k30*TCF7L2;
  eq_32: -> TEAD4; g31*hillfunction(SOX2, T204, lambda206, n205)*(hillfunction(MYC, T303, lambda305, n304)/lambda305)*hillfunction(PBX1, T429, lambda431, n430)*(hillfunction(MITF, T552, lambda554, n553)/lambda554)*hillfunction(LEF1, T627, lambda629, n628)*hillfunction(ELF3, T774, lambda776, n775)*(hillfunction(NFKB1, T789, lambda791, n790)/lambda791)*hillfunction(TCF12, T960, lambda962, n961)*hillfunction(TCF3, T999, lambda1001, n1000) - k31*TEAD4;
  eq_33: -> ZEB1; g32*hillfunction(ETS2, T723, lambda725, n724)*(hillfunction(REST, T879, lambda881, n880)/lambda881)*(hillfunction(TCF3, T1002, lambda1004, n1003)/lambda1004)*hillfunction(TCF12, T1014, lambda1016, n1015)*hillfunction(OVOL2, T1092, lambda1094, n1093)*(hillfunction(TCF4, T1122, lambda1124, n1123)/lambda1124)*(hillfunction(KDM5B, T1134, lambda1136, n1135)/lambda1136) - k32*ZEB1;
end
