// SBML level 2 version 3

function hillfunction(x, CD24, lamda, nx)
  lamda + (1 - lamda)*(1/(1 + (x/CD24)^nx));
end

model No_1_model_1()

  // Species:
  species CD24 = 58.886585;
  species CD44s = 37.110288;
  species CDH1 = 312.301688;
  species EMT = 0.125638;
  species ESRP1 = 38.47576;
  species EX_TGFB = 24.854566; EX_TGFB is "EX-TGFB";
  species GRHL2 = 162.867665;
  species HA = 51.698595;
  species HAS2 = 2.204496;
  species MIR_1199 = 28.809956; MIR_1199 is "MIR-1199";
  species MIR_129 = 144.307558; MIR_129 is "MIR-129";
  species MIR_190 = 153.780002; MIR_190 is "MIR-190";
  species MIR_200 = 37.754824; MIR_200 is "MIR-200";
  species MIR_34 = 42.631568; MIR_34 is "MIR-34";
  species MIR_340 = 66.999863; MIR_340 is "MIR-340";
  species SNAIL1 = 0.001428;
  species TGFB = 0.604291;
  species TWIST1 = 0.134911;
  species VIM = 0.08846;
  species ZEB1 = 0.000324;

  // Parameters:
  g0 = 43.551432;
  g1 = 45.465308;
  g2 = 83.35192;
  g3 = 13.159448;
  g4 = 19.235599;
  g5 = 20.823034;
  g6 = 95.362507;
  g7 = 25.907478;
  g8 = 36.641068;
  g9 = 16.407796;
  g10 = 83.359521;
  g11 = 31.222851;
  g12 = 34.141384;
  g13 = 28.841908;
  g14 = 39.542528;
  g15 = 444.163818;
  g16 = 91.434333;
  g17 = 27.354528;
  g18 = 30.178048;
  g19 = 9937.843;
  k0 = 0.73933;
  k1 = 0.728069;
  k2 = 0.266722;
  k3 = 0.65027;
  k4 = 0.499607;
  k5 = 0.837795;
  k6 = 0.585521;
  k7 = 0.183155;
  k8 = 0.69599;
  k9 = 0.569518;
  k10 = 0.577652;
  k11 = 0.203036;
  k12 = 0.904292;
  k13 = 0.676198;
  k14 = 0.590188;
  k15 = 0.291314;
  k16 = 0.292334;
  k17 = 0.916819;
  k18 = 0.278659;
  k19 = 0.420308;
  T40 = 43.420979;
  T43 = 53.393061;
  T46 = 2.166831;
  T49 = 3.323417;
  T52 = 18.091379;
  T55 = 0.492987;
  T58 = 8.410375;
  T61 = 0.45794;
  T64 = 2.371572;
  T67 = 3.205789;
  T70 = 3.64559;
  T73 = 0.633913;
  T76 = 15.398259;
  T79 = 4.362093;
  T82 = 0.721827;
  T85 = 1.556526;
  T88 = 0.488347;
  T91 = 2.747579;
  T94 = 3.108241;
  T97 = 2.948612;
  T100 = 71.190548;
  T103 = 5.603651;
  T106 = 6.518446;
  T109 = 14.56478;
  T112 = 5.712171;
  T115 = 12.414548;
  T118 = 26.391381;
  T121 = 2.400292;
  T124 = 14.894009;
  T127 = 2.525877;
  T130 = 1.897387;
  T133 = 0.654542;
  T136 = 52.843608;
  T139 = 2.3339;
  T142 = 60.934433;
  T145 = 56.283081;
  T148 = 8.831139;
  T151 = 37.176265;
  T154 = 33.219452;
  T157 = 10.674744;
  n41 = 6;
  n44 = 1;
  n47 = 1;
  n50 = 6;
  n53 = 3;
  n56 = 1;
  n59 = 4;
  n62 = 1;
  n65 = 4;
  n68 = 2;
  n71 = 1;
  n74 = 2;
  n77 = 5;
  n80 = 4;
  n83 = 6;
  n86 = 5;
  n89 = 5;
  n92 = 1;
  n95 = 6;
  n98 = 4;
  n101 = 4;
  n104 = 1;
  n107 = 3;
  n110 = 4;
  n113 = 3;
  n116 = 4;
  n119 = 6;
  n122 = 5;
  n125 = 4;
  n128 = 5;
  n131 = 1;
  n134 = 4;
  n137 = 3;
  n140 = 5;
  n143 = 6;
  n146 = 2;
  n149 = 4;
  n152 = 1;
  n155 = 2;
  n158 = 2;
  lambda42 = 19.195961;
  lambda45 = 0.031245;
  lambda48 = 0.01175;
  lambda51 = 0.034845;
  lambda54 = 0.018534;
  lambda57 = 0.014453;
  lambda60 = 2.578161;
  lambda63 = 0.05466;
  lambda66 = 0.02121;
  lambda69 = 15.280722;
  lambda72 = 23.929787;
  lambda75 = 0.0116;
  lambda78 = 0.021098;
  lambda81 = 0.071891;
  lambda84 = 0.03189;
  lambda87 = 0.044269;
  lambda90 = 0.013112;
  lambda93 = 0.029096;
  lambda96 = 0.011214;
  lambda99 = 0.031002;
  lambda102 = 64.739751;
  lambda105 = 0.089514;
  lambda108 = 0.013207;
  lambda111 = 9.628442;
  lambda114 = 55.417741;
  lambda117 = 0.031342;
  lambda120 = 0.045398;
  lambda123 = 7.556678;
  lambda126 = 0.03406;
  lambda129 = 25.092922;
  lambda132 = 49.189751;
  lambda135 = 60.501036;
  lambda138 = 0.020507;
  lambda141 = 0.014926;
  lambda144 = 0.025189;
  lambda147 = 0.037713;
  lambda150 = 0.042728;
  lambda153 = 98.364355;
  lambda156 = 11.260812;
  lambda159 = 18.475057;

  // Reactions:
  eq_1: -> CD24; g0*(hillfunction(GRHL2, T106, lambda108, n107)/lambda108) - k0*CD24;
  eq_2: -> CD44s; g1*hillfunction(ESRP1, T133, lambda135, n134) - k1*CD44s;
  eq_3: -> CDH1; g2*hillfunction(SNAIL1, T52, lambda54, n53)*hillfunction(ZEB1, T67, lambda69, n68)*hillfunction(TWIST1, T151, lambda153, n152) - k2*CDH1;
  eq_4: -> EMT; g3*hillfunction(CDH1, T112, lambda114, n113)*(hillfunction(VIM, T115, lambda117, n116)/lambda117) - k3*EMT;
  eq_5: -> ESRP1; g4*hillfunction(ZEB1, T79, lambda81, n80) - k4*ESRP1;
  eq_6: -> EX_TGFB; g5 - k5*EX_TGFB;
  eq_7: -> GRHL2; g6*hillfunction(ZEB1, T76, lambda78, n77) - k6*GRHL2;
  eq_8: -> HA; g7*(hillfunction(HAS2, T127, lambda129, n128)/lambda129) - k7*HA;
  eq_9: -> HAS2; g8*(hillfunction(ZEB1, T82, lambda84, n83)/lambda84) - k8*HAS2;
  eq_10: -> MIR_1199; g9*hillfunction(ZEB1, T73, lambda75, n74) - k9*MIR_1199;
  eq_11: -> MIR_129; g10*hillfunction(TWIST1, T154, lambda156, n155)*hillfunction(SNAIL1, T157, lambda159, n158) - k10*MIR_129;
  eq_12: -> MIR_190; g11*hillfunction(ZEB1, T85, lambda87, n86) - k11*MIR_190;
  eq_13: -> MIR_200; g12*hillfunction(SNAIL1, T49, lambda51, n50)*hillfunction(ZEB1, T61, lambda63, n62) - k12*MIR_200;
  eq_14: -> MIR_34; g13*hillfunction(SNAIL1, T46, lambda48, n47)*hillfunction(ZEB1, T64, lambda66, n65) - k13*MIR_34;
  eq_15: -> MIR_340; g14*hillfunction(ZEB1, T88, lambda90, n89) - k14*MIR_340;
  eq_16: -> SNAIL1; g15*(hillfunction(EX_TGFB, T40, lambda42, n41)/lambda42)*hillfunction(SNAIL1, T43, lambda45, n44)*hillfunction(MIR_34, T94, lambda96, n95)*(hillfunction(TGFB, T118, lambda120, n119)/lambda120)*(hillfunction(TWIST1, T148, lambda150, n149)/lambda150) - k15*SNAIL1;
  eq_17: -> TGFB; g16*hillfunction(MIR_200, T100, lambda102, n101)*hillfunction(MIR_190, T124, lambda126, n125) - k16*TGFB;
  eq_18: -> TWIST1; g17*(hillfunction(SNAIL1, T139, lambda141, n140)/lambda141)*hillfunction(MIR_129, T142, lambda144, n143) - k17*TWIST1;
  eq_19: -> VIM; g18*(hillfunction(SNAIL1, T55, lambda57, n56)/lambda57)*(hillfunction(ZEB1, T70, lambda72, n71)/lambda72) - k18*VIM;
  eq_20: -> ZEB1; g19*(hillfunction(SNAIL1, T58, lambda60, n59)/lambda60)*hillfunction(MIR_1199, T91, lambda93, n92)*hillfunction(MIR_200, T97, lambda99, n98)*hillfunction(CD24, T103, lambda105, n104)*hillfunction(GRHL2, T109, lambda111, n110)*hillfunction(MIR_340, T121, lambda123, n122)*(hillfunction(HA, T130, lambda132, n131)/lambda132)*(hillfunction(CD44s, T136, lambda138, n137)/lambda138)*(hillfunction(TWIST1, T145, lambda147, n146)/lambda147) - k19*ZEB1;
end
