// SBML level 2 version 3

function hillfunction(x, EX_TGFB, lamda, nx)
  lamda + (1 - lamda)*(1/(1 + (x/EX_TGFB)^nx));
end

model No_3_model_2()

  // Species:
  species EX_TGFB = 18.465065; EX_TGFB is "EX-TGFB";
  species SNAIL1 = 0.003047;
  species MIR_34 = 315.80646; MIR_34 is "MIR-34";
  species MIR_200 = 12.824787; MIR_200 is "MIR-200";
  species CDH1 = 105.377095;
  species VIM = 0.918166;
  species ZEB1 = 0.000031;
  species MIR_1199 = 87.95383; MIR_1199 is "MIR-1199";
  species GRHL2 = 10.613157;
  species ESRP1 = 65.622796;
  species HAS2 = 35.108156;
  species MIR_190 = 113.419859; MIR_190 is "MIR-190";
  species MIR_340 = 241.863794; MIR_340 is "MIR-340";
  species TGFB = 2.819516;
  species CD24 = 293.679969;
  species EMT = 0.516476;
  species HA = 54.633839;
  species CD44s = 9.854413;

  // Parameters:
  g0 = 13.257172;
  g1 = 98.54385;
  g2 = 87.601066;
  g3 = 2.467334;
  g4 = 95.051954;
  g5 = 66.472732;
  g6 = 4363.611;
  g7 = 16.328285;
  g8 = 8.293321;
  g9 = 52.150801;
  g10 = 60.119504;
  g11 = 77.304229;
  g12 = 39.425593;
  g13 = 63.624527;
  g14 = 96.756755;
  g15 = 59.997707;
  g16 = 79.844218;
  g17 = 47.715488;
  k0 = 0.71796;
  k1 = 0.353902;
  k2 = 0.277388;
  k3 = 0.192387;
  k4 = 0.899876;
  k5 = 0.569803;
  k6 = 0.237596;
  k7 = 0.185646;
  k8 = 0.781419;
  k9 = 0.794706;
  k10 = 0.140005;
  k11 = 0.681576;
  k12 = 0.163003;
  k13 = 0.975994;
  k14 = 0.259305;
  k15 = 0.933193;
  k16 = 0.37459;
  k17 = 0.512606;
  T36 = 171.704617;
  T39 = 0.814103;
  T42 = 6.691291;
  T45 = 14.147975;
  T48 = 0.433381;
  T51 = 0.867425;
  T54 = 1.176259;
  T57 = 0.619536;
  T60 = 1.148631;
  T63 = 0.995717;
  T66 = 1.538737;
  T69 = 0.888778;
  T72 = 0.128383;
  T75 = 13.304855;
  T78 = 2.937547;
  T81 = 58.757901;
  T84 = 45.994165;
  T87 = 41.860336;
  T90 = 57.268687;
  T93 = 49.249302;
  T96 = 0.465288;
  T99 = 0.27135;
  T102 = 0.922065;
  T105 = 0.390467;
  T108 = 0.188768;
  T111 = 0.949763;
  T114 = 12.995604;
  T117 = 43.178294;
  T120 = 8.595968;
  T123 = 0.803482;
  T126 = 0.729795;
  T129 = 51.062865;
  T132 = 40.313426;
  n37 = 3;
  n40 = 4;
  n43 = 3;
  n46 = 2;
  n49 = 3;
  n52 = 5;
  n55 = 2;
  n58 = 6;
  n61 = 1;
  n64 = 6;
  n67 = 4;
  n70 = 2;
  n73 = 4;
  n76 = 4;
  n79 = 3;
  n82 = 1;
  n85 = 1;
  n88 = 3;
  n91 = 4;
  n94 = 2;
  n97 = 5;
  n100 = 3;
  n103 = 4;
  n106 = 3;
  n109 = 6;
  n112 = 1;
  n115 = 5;
  n118 = 3;
  n121 = 6;
  n124 = 2;
  n127 = 3;
  n130 = 3;
  n133 = 5;
  lambda38 = 65.936656;
  lambda41 = 0.010643;
  lambda44 = 0.01274;
  lambda47 = 67.908601;
  lambda50 = 0.033428;
  lambda53 = 0.010579;
  lambda56 = 0.010852;
  lambda59 = 0.04246;
  lambda62 = 0.102437;
  lambda65 = 0.012532;
  lambda68 = 13.246726;
  lambda71 = 9.591561;
  lambda74 = 33.313056;
  lambda77 = 0.017587;
  lambda80 = 0.012287;
  lambda83 = 0.063741;
  lambda86 = 0.012488;
  lambda89 = 0.011958;
  lambda92 = 15.528755;
  lambda95 = 20.360035;
  lambda98 = 0.015001;
  lambda101 = 0.023249;
  lambda104 = 0.029662;
  lambda107 = 12.231024;
  lambda110 = 0.01589;
  lambda113 = 0.065193;
  lambda116 = 0.022932;
  lambda119 = 0.031323;
  lambda122 = 30.570837;
  lambda125 = 0.011945;
  lambda128 = 92.935613;
  lambda131 = 68.474089;
  lambda134 = 0.027635;

  // Reactions:
  eq_1: -> EX_TGFB; g0 - k0*EX_TGFB;
  eq_2: -> SNAIL1; g1*(hillfunction(EX_TGFB, T36, lambda38, n37)/lambda38)*hillfunction(SNAIL1, T39, lambda41, n40)*hillfunction(MIR_34, T90, lambda92, n91)*(hillfunction(TGFB, T114, lambda116, n115)/lambda116) - k1*SNAIL1;
  eq_3: -> MIR_34; g2*hillfunction(SNAIL1, T42, lambda44, n43)*hillfunction(ZEB1, T60, lambda62, n61) - k2*MIR_34;
  eq_4: -> MIR_200; g3*hillfunction(SNAIL1, T45, lambda47, n46)*hillfunction(ZEB1, T57, lambda59, n58) - k3*MIR_200;
  eq_5: -> CDH1; g4*hillfunction(SNAIL1, T48, lambda50, n49)*hillfunction(ZEB1, T63, lambda65, n64) - k4*CDH1;
  eq_6: -> VIM; g5*(hillfunction(SNAIL1, T51, lambda53, n52)/lambda53)*(hillfunction(ZEB1, T66, lambda68, n67)/lambda68) - k5*VIM;
  eq_7: -> ZEB1; g6*(hillfunction(SNAIL1, T54, lambda56, n55)/lambda56)*hillfunction(MIR_1199, T87, lambda89, n88)*hillfunction(MIR_200, T93, lambda95, n94)*hillfunction(CD24, T99, lambda101, n100)*hillfunction(GRHL2, T105, lambda107, n106)*hillfunction(MIR_340, T117, lambda119, n118)*(hillfunction(HA, T126, lambda128, n127)/lambda128)*(hillfunction(CD44s, T132, lambda134, n133)/lambda134) - k6*ZEB1;
  eq_8: -> MIR_1199; g7*hillfunction(ZEB1, T69, lambda71, n70) - k7*MIR_1199;
  eq_9: -> GRHL2; g8*hillfunction(ZEB1, T72, lambda74, n73) - k8*GRHL2;
  eq_10: -> ESRP1; g9*hillfunction(ZEB1, T75, lambda77, n76) - k9*ESRP1;
  eq_11: -> HAS2; g10*(hillfunction(ZEB1, T78, lambda80, n79)/lambda80) - k10*HAS2;
  eq_12: -> MIR_190; g11*hillfunction(ZEB1, T81, lambda83, n82) - k11*MIR_190;
  eq_13: -> MIR_340; g12*hillfunction(ZEB1, T84, lambda86, n85) - k12*MIR_340;
  eq_14: -> TGFB; g13*hillfunction(MIR_200, T96, lambda98, n97)*hillfunction(MIR_190, T120, lambda122, n121) - k13*TGFB;
  eq_15: -> CD24; g14*(hillfunction(GRHL2, T102, lambda104, n103)/lambda104) - k14*CD24;
  eq_16: -> EMT; g15*hillfunction(CDH1, T108, lambda110, n109)*(hillfunction(VIM, T111, lambda113, n112)/lambda113) - k15*EMT;
  eq_17: -> HA; g16*(hillfunction(HAS2, T123, lambda125, n124)/lambda125) - k16*HA;
  eq_18: -> CD44s; g17*hillfunction(ESRP1, T129, lambda131, n130) - k17*CD44s;
end
