// SBML level 2 version 3

function hillfunction(x, EXTGFB, lamda, nx)
  lamda + (1 - lamda)*(1/(1 + (x/EXTGFB)^nx));
end

model No_2_model_1()

  // Species:
  species EXTGFB = 222.83204;
  species snail1 = 83.879871;
  species SNAIL1 = 289.526727;
  species MIR_34 = 10.759378; MIR_34 is "MIR-34";
  species ECAD = 0.704556;
  species NCAD = 182.36708;
  species zeb = 59.681424;
  species TGFB = 36.622339;
  species ZEB = 154.346005;
  species MIR_200 = 0.859723; MIR_200 is "MIR-200";

  // Parameters:
  g0 = 96.769287;
  g1 = 61.262025;
  g2 = 98.498235;
  g3 = 45.293427;
  g4 = 94.683927;
  g5 = 45.709628;
  g6 = 57.780172;
  g7 = 16.323314;
  g8 = 38.055133;
  g9 = 81.170272;
  k0 = 0.43427;
  k1 = 0.412906;
  k2 = 0.298811;
  k3 = 0.154908;
  k4 = 0.604933;
  k5 = 0.250443;
  k6 = 0.968137;
  k7 = 0.422333;
  k8 = 0.201031;
  k9 = 0.966715;
  T20 = 15.444638;
  T23 = 32.429138;
  T26 = 10.101426;
  T29 = 30.224262;
  T32 = 15.911459;
  T35 = 10.042985;
  T38 = 9.285586;
  T41 = 7.886707;
  T44 = 14.525361;
  T47 = 14.704312;
  T50 = 15.354241;
  T53 = 43.023262;
  T56 = 9.977276;
  T59 = 2.554868;
  n21 = 6;
  n24 = 2;
  n27 = 2;
  n30 = 2;
  n33 = 4;
  n36 = 2;
  n39 = 6;
  n42 = 2;
  n45 = 4;
  n48 = 4;
  n51 = 1;
  n54 = 4;
  n57 = 3;
  n60 = 4;
  lambda22 = 35.854152;
  lambda25 = 90.652176;
  lambda28 = 97.175521;
  lambda31 = 0.030271;
  lambda34 = 0.036789;
  lambda37 = 0.076243;
  lambda40 = 0.058192;
  lambda43 = 79.160645;
  lambda46 = 67.380149;
  lambda49 = 55.055551;
  lambda52 = 0.010411;
  lambda55 = 7.460703;
  lambda58 = 0.014702;
  lambda61 = 0.010239;

  // Reactions:
  eq_1: -> EXTGFB; g0 - k0*EXTGFB;
  eq_2: -> snail1; g1*(hillfunction(EXTGFB, T20, lambda22, n21)/lambda22)*(hillfunction(TGFB, T41, lambda43, n42)/lambda43) - k1*snail1;
  eq_3: -> SNAIL1; g2*(hillfunction(snail1, T23, lambda25, n24)/lambda25)*hillfunction(MIR_34, T29, lambda31, n30) - k2*SNAIL1;
  eq_4: -> MIR_34; g3*hillfunction(SNAIL1, T26, lambda28, n27) - k3*MIR_34;
  eq_5: -> ECAD; g4*hillfunction(SNAIL1, T32, lambda34, n33)*hillfunction(ZEB, T50, lambda52, n51) - k4*ECAD;
  eq_6: -> NCAD; g5*(hillfunction(SNAIL1, T35, lambda37, n36)/lambda37)*(hillfunction(ZEB, T47, lambda49, n48)/lambda49) - k5*NCAD;
  eq_7: -> zeb; g6*(hillfunction(SNAIL1, T38, lambda40, n39)/lambda40) - k6*zeb;
  eq_8: -> TGFB; g7*hillfunction(MIR_200, T56, lambda58, n57) - k7*TGFB;
  eq_9: -> ZEB; g8*(hillfunction(zeb, T44, lambda46, n45)/lambda46)*hillfunction(MIR_200, T59, lambda61, n60) - k8*ZEB;
  eq_10: -> MIR_200; g9*hillfunction(ZEB, T53, lambda55, n54) - k9*MIR_200;
end
