// SBML level 2 version 3

function hillfunction(x, CDC1420, lamda, nx)
  lamda + (1 - lamda)*(1/(1 + (x/CDC1420)^nx));
end

model No_1_model_1()

  // Species:
  species CDC1420 = 1.031205;
  species CDH1 = 0.002899;
  species CLB12 = 65.687181;
  species CLB56 = 13.458167;
  species CLN12 = 4.844337;
  species CLN3 = 20.214758;
  species CSIZE = 128.751705;
  species MBF = 6.228147;
  species MCM1 = 3.934162;
  species SBF = 19.609583;
  species SIC1 = 0.000319;
  species SWI5 = 0.156372;

  // Parameters:
  g0 = 48.362877;
  g1 = 88.133863;
  g2 = 212.828602;
  g3 = 12.131391;
  g4 = 30.093331;
  g5 = 44.988963;
  g6 = 91.989201;
  g7 = 95.657677;
  g8 = 89.611974;
  g9 = 95.036142;
  g10 = 573.048713;
  g11 = 23.449526;
  k0 = 0.899954;
  k1 = 0.681667;
  k2 = 0.898566;
  k3 = 0.320331;
  k4 = 0.976657;
  k5 = 0.529693;
  k6 = 0.71447;
  k7 = 0.928263;
  k8 = 0.981986;
  k9 = 0.464733;
  k10 = 0.632717;
  k11 = 0.508477;
  T24 = 0.310044;
  T27 = 4.256082;
  T30 = 0.61167;
  T33 = 13.818291;
  T36 = 5.948572;
  T39 = 0.053874;
  T42 = 2.522239;
  T45 = 1.329513;
  T48 = 2.940852;
  T51 = 4.803366;
  T54 = 4.072047;
  T57 = 4.266293;
  T60 = 5.494165;
  T63 = 12.275703;
  T66 = 4.106323;
  T69 = 3.714002;
  T72 = 3.609414;
  T75 = 106.696446;
  T78 = 18.594196;
  T81 = 12.790591;
  T84 = 2.983005;
  T87 = 0.400581;
  T90 = 0.888511;
  T93 = 2.106604;
  T96 = 12.690302;
  T99 = 0.408734;
  T102 = 8.412368;
  T105 = 1.547666;
  T108 = 0.577166;
  T111 = 0.869619;
  T114 = 2.729398;
  T117 = 0.312801;
  T120 = 1.454845;
  T123 = 6.253847;
  T126 = 1.508996;
  n25 = 3;
  n28 = 1;
  n31 = 1;
  n34 = 3;
  n37 = 4;
  n40 = 4;
  n43 = 5;
  n46 = 4;
  n49 = 6;
  n52 = 5;
  n55 = 5;
  n58 = 6;
  n61 = 6;
  n64 = 1;
  n67 = 2;
  n70 = 6;
  n73 = 6;
  n76 = 1;
  n79 = 6;
  n82 = 6;
  n85 = 1;
  n88 = 2;
  n91 = 1;
  n94 = 3;
  n97 = 5;
  n100 = 2;
  n103 = 4;
  n106 = 6;
  n109 = 4;
  n112 = 5;
  n115 = 3;
  n118 = 3;
  n121 = 2;
  n124 = 5;
  n127 = 1;
  lambda26 = 0.013006;
  lambda29 = 35.538018;
  lambda32 = 49.427811;
  lambda35 = 0.012651;
  lambda38 = 22.702675;
  lambda41 = 0.015357;
  lambda44 = 0.033898;
  lambda47 = 0.015284;
  lambda50 = 0.020468;
  lambda53 = 79.774141;
  lambda56 = 10.642205;
  lambda59 = 0.011997;
  lambda62 = 0.013542;
  lambda65 = 35.300591;
  lambda68 = 0.030129;
  lambda71 = 54.896424;
  lambda74 = 0.01304;
  lambda77 = 13.747061;
  lambda80 = 0.053435;
  lambda83 = 74.090955;
  lambda86 = 0.021767;
  lambda89 = 0.03589;
  lambda92 = 17.112466;
  lambda95 = 98.361346;
  lambda98 = 78.941135;
  lambda101 = 0.105077;
  lambda104 = 0.041882;
  lambda107 = 87.923652;
  lambda110 = 71.518487;
  lambda113 = 0.018143;
  lambda116 = 0.012191;
  lambda119 = 10.692134;
  lambda122 = 0.013109;
  lambda125 = 64.942824;
  lambda128 = 0.011711;

  // Reactions:
  eq_1: -> CDC1420; g0*hillfunction(CDC1420, T60, lambda62, n61)*(hillfunction(MCM1, T78, lambda80, n79)/lambda80)*(hillfunction(CLB12, T111, lambda113, n112)/lambda113) - k0*CDC1420;
  eq_2: -> CDH1; g1*hillfunction(CLN12, T42, lambda44, n43)*(hillfunction(CDC1420, T51, lambda53, n52)/lambda53)*hillfunction(CLB56, T96, lambda98, n97)*hillfunction(CLB12, T117, lambda119, n118) - k1*CDH1;
  eq_3: -> CLB12; g2*hillfunction(CDH1, T48, lambda50, n49)*hillfunction(CDC1420, T63, lambda65, n64)*(hillfunction(MCM1, T81, lambda83, n82)/lambda83)*(hillfunction(CLB56, T90, lambda92, n91)/lambda92)*hillfunction(SIC1, T105, lambda107, n106) - k2*CLB12;
  eq_4: -> CLB56; g3*hillfunction(CDC1420, T66, lambda68, n67)*(hillfunction(MBF, T99, lambda101, n100)/lambda101)*hillfunction(SIC1, T102, lambda104, n103) - k3*CLB56;
  eq_5: -> CLN12; g4*(hillfunction(SBF, T36, lambda38, n37)/lambda38)*hillfunction(CLN12, T45, lambda47, n46) - k4*CLN12;
  eq_6: -> CLN3; g5*(hillfunction(CSIZE, T24, lambda26, n25)/lambda26)*hillfunction(CLN3, T33, lambda35, n34) - k5*CLN3;
  eq_7: -> CSIZE; g6 - k6*CSIZE;
  eq_8: -> MBF; g7*(hillfunction(CLN3, T27, lambda29, n28)/lambda29)*hillfunction(CLB12, T123, lambda125, n124) - k7*MBF;
  eq_9: -> MCM1; g8*hillfunction(MCM1, T84, lambda86, n85)*(hillfunction(CLB56, T87, lambda89, n88)/lambda89)*(hillfunction(CLB12, T108, lambda110, n109)/lambda110) - k8*MCM1;
  eq_10: -> SBF; g9*(hillfunction(CLN3, T30, lambda32, n31)/lambda32)*hillfunction(CLB12, T126, lambda128, n127) - k9*SBF;
  eq_11: -> SIC1; g10*hillfunction(CLN12, T39, lambda41, n40)*(hillfunction(CDC1420, T57, lambda59, n58)/lambda59)*(hillfunction(SWI5, T69, lambda71, n70)/lambda71)*hillfunction(CLB56, T93, lambda95, n94)*hillfunction(CLB12, T114, lambda116, n115) - k10*SIC1;
  eq_12: -> SWI5; g11*(hillfunction(CDC1420, T54, lambda56, n55)/lambda56)*hillfunction(SWI5, T72, lambda74, n73)*(hillfunction(MCM1, T75, lambda77, n76)/lambda77)*hillfunction(CLB12, T120, lambda122, n121) - k11*SWI5;
end
