// SBML level 2 version 3

function hillfunction(x, CDC1420, lamda, nx)
  lamda + (1 - lamda)*(1/(1 + (x/CDC1420)^nx));
end

model No_2_model_3()

  // Species:
  species CDC1420 = 2.736114;
  species CDH1 = 3.061537;
  species CLB12 = 0.718741;
  species CLB56 = 28.610877;
  species CLN12 = 34.961384;
  species CLN3 = 20.208394;
  species CSIZE = 200.730931;
  species MBF = 77.282982;
  species MCM1 = 0.335354;
  species SBF = 38.311717;
  species SIC1 = 1.044546;
  species SWI5 = 0.962663;

  // Parameters:
  g0 = 83.190379;
  g1 = 46.95619;
  g2 = 710.03125;
  g3 = 59.596678;
  g4 = 86.872681;
  g5 = 19.059356;
  g6 = 66.809129;
  g7 = 64.011994;
  g8 = 62.925628;
  g9 = 44.245423;
  g10 = 686.810267;
  g11 = 73.795158;
  k0 = 0.751507;
  k1 = 0.417644;
  k2 = 0.986777;
  k3 = 0.981448;
  k4 = 0.221263;
  k5 = 0.150312;
  k6 = 0.332829;
  k7 = 0.816261;
  k8 = 0.370939;
  k9 = 0.623836;
  k10 = 0.702354;
  k11 = 0.484059;
  T24 = 5.325963;
  T27 = 4.417432;
  T30 = 1.222195;
  T33 = 13.594984;
  T36 = 0.483295;
  T39 = 3.284882;
  T42 = 4.161891;
  T45 = 1.024688;
  T48 = 2.046335;
  T51 = 4.769854;
  T54 = 3.605955;
  T57 = 4.103757;
  T60 = 2.912984;
  T63 = 14.854786;
  T66 = 3.426129;
  T69 = 12.462242;
  T72 = 10.414892;
  T75 = 71.640659;
  T78 = 13.709335;
  T81 = 3.703663;
  T84 = 2.150804;
  T87 = 0.173119;
  T90 = 4.032478;
  T93 = 1.961727;
  T96 = 7.189661;
  T99 = 0.667409;
  T102 = 11.17582;
  T105 = 2.460784;
  T108 = 1.377028;
  T111 = 0.540847;
  T114 = 2.437388;
  T117 = 2.03442;
  T120 = 0.655395;
  T123 = 4.583447;
  T126 = 3.798462;
  n25 = 3;
  n28 = 1;
  n31 = 3;
  n34 = 6;
  n37 = 3;
  n40 = 4;
  n43 = 3;
  n46 = 2;
  n49 = 6;
  n52 = 5;
  n55 = 6;
  n58 = 1;
  n61 = 1;
  n64 = 2;
  n67 = 3;
  n70 = 3;
  n73 = 2;
  n76 = 4;
  n79 = 5;
  n82 = 3;
  n85 = 4;
  n88 = 5;
  n91 = 1;
  n94 = 6;
  n97 = 2;
  n100 = 6;
  n103 = 3;
  n106 = 5;
  n109 = 1;
  n112 = 3;
  n115 = 6;
  n118 = 2;
  n121 = 6;
  n124 = 3;
  n127 = 1;
  lambda26 = 0.011443;
  lambda29 = 24.636499;
  lambda32 = 6.842859;
  lambda35 = 0.02152;
  lambda38 = 45.235396;
  lambda41 = 0.035058;
  lambda44 = 0.016366;
  lambda47 = 0.061017;
  lambda50 = 0.206924;
  lambda53 = 43.33108;
  lambda56 = 50.536305;
  lambda59 = 0.917178;
  lambda62 = 0.019622;
  lambda65 = 92.945601;
  lambda68 = 0.014443;
  lambda71 = 66.921314;
  lambda74 = 0.012462;
  lambda77 = 31.335331;
  lambda80 = 0.041447;
  lambda83 = 36.618375;
  lambda86 = 0.077673;
  lambda89 = 0.014223;
  lambda92 = 81.671274;
  lambda95 = 22.385092;
  lambda98 = 15.175116;
  lambda101 = 0.024477;
  lambda104 = 0.011173;
  lambda107 = 36.507404;
  lambda110 = 7.495361;
  lambda113 = 0.067701;
  lambda116 = 0.031904;
  lambda119 = 68.68459;
  lambda122 = 0.010334;
  lambda125 = 8.526103;
  lambda128 = 0.012501;

  // Reactions:
  eq_1: -> CDC1420; g0*hillfunction(CDC1420, T60, lambda62, n61)*(hillfunction(MCM1, T78, lambda80, n79)/lambda80)*(hillfunction(CLB12, T111, lambda113, n112)/lambda113) - k0*CDC1420;
  eq_2: -> CDH1; g1*hillfunction(CLN12, T42, lambda44, n43)*(hillfunction(CDC1420, T51, lambda53, n52)/lambda53)*hillfunction(CLB56, T96, lambda98, n97)*hillfunction(CLB12, T117, lambda119, n118) - k1*CDH1;
  eq_3: -> CLB12; g2*hillfunction(CDH1, T48, lambda50, n49)*hillfunction(CDC1420, T63, lambda65, n64)*(hillfunction(MCM1, T81, lambda83, n82)/lambda83)*(hillfunction(CLB56, T90, lambda92, n91)/lambda92)*hillfunction(SIC1, T105, lambda107, n106) - k2*CLB12;
  eq_4: -> CLB56; g3*hillfunction(CDC1420, T66, lambda68, n67)*(hillfunction(MBF, T99, lambda101, n100)/lambda101)*hillfunction(SIC1, T102, lambda104, n103) - k3*CLB56;
  eq_5: -> CLN12; g4*(hillfunction(SBF, T36, lambda38, n37)/lambda38)*hillfunction(CLN12, T45, lambda47, n46) - k4*CLN12;
  eq_6: -> CLN3; g5*(hillfunction(CSIZE, T24, lambda26, n25)/lambda26)*hillfunction(CLN3, T33, lambda35, n34) - k5*CLN3;
  eq_7: -> CSIZE; g6 - k6*CSIZE;
  eq_8: -> MBF; g7*(hillfunction(CLN3, T27, lambda29, n28)/lambda29)*hillfunction(CLB12, T123, lambda125, n124) - k7*MBF;
  eq_9: -> MCM1; g8*hillfunction(MCM1, T84, lambda86, n85)*(hillfunction(CLB56, T87, lambda89, n88)/lambda89)*(hillfunction(CLB12, T108, lambda110, n109)/lambda110) - k8*MCM1;
  eq_10: -> SBF; g9*(hillfunction(CLN3, T30, lambda32, n31)/lambda32)*hillfunction(CLB12, T126, lambda128, n127) - k9*SBF;
  eq_11: -> SIC1; g10*hillfunction(CLN12, T39, lambda41, n40)*(hillfunction(CDC1420, T57, lambda59, n58)/lambda59)*(hillfunction(SWI5, T69, lambda71, n70)/lambda71)*hillfunction(CLB56, T93, lambda95, n94)*hillfunction(CLB12, T114, lambda116, n115) - k10*SIC1;
  eq_12: -> SWI5; g11*(hillfunction(CDC1420, T54, lambda56, n55)/lambda56)*hillfunction(SWI5, T72, lambda74, n73)*(hillfunction(MCM1, T75, lambda77, n76)/lambda77)*hillfunction(CLB12, T120, lambda122, n121) - k11*SWI5;
end
